*Heading
** Job name: B2EQ110_surch30 Model name: B2m_EQ_N110-Surcharge
** Generated by: Abaqus/CAE 6.14-1
*Preprint, echo=NO, model=NO, history=NO, contact=NO
**
** PARTS
**
*Part, name=FOOTING
*Node
      1,           6.,         6.25
      2,           6.,        11.25
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*Element, type=B21
1,  1,  7
2,  7,  8
3,  8,  9
4,  9, 10
5, 10,  2
*Element, type=CPE4R
 6,  3, 11, 20,  6
 7, 11, 12, 19, 20
 8, 12, 13, 18, 19
 9, 13, 14,  1, 18
10, 14, 15, 23,  1
11, 15, 16, 22, 23
12, 16, 17, 21, 22
13, 17,  4,  5, 21
*Nset, nset=FOOTING
  1,  3,  4,  5,  6, 11
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*Elset, elset=FOOTING, generate
  6,  13,   1
*Nset, nset=PIER
  1,  2,  7,  8,  9, 10
*Elset, elset=PIER, generate
 1,  5,  1
*Nset, nset=CM
 1,
*Nset, nset=MASS
 2,
*Elset, elset=_SURF-FS_S1, internal, generate
  6,  13,   1
*Surface, type=ELEMENT, name=SURF-FS
_SURF-FS_S1, S1
** Section: Section-1-PIER  Profile: Profile-1
*Beam Section, elset=PIER, material=PIER, poisson = 0.2, temperature=GRADIENTS, section=CIRC
3.
0.,0.,-1.
** Section: Section-2-FOOTING
*Solid Section, elset=FOOTING, material=FOOTING
,
*End Part
**
*Part, name=SOIL
*Node
      1,          35.,          -5.
      2,          35.,          25.
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*Element, type=CPE4R
   1,    1,   13,  677,  188
   2,   13,   14,  678,  677
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*Nset, nset=SOIL, generate
    1,  9821,     1
*Elset, elset=SOIL, generate
    1,  9600,     1
*Nset, nset=SURF_SOIL-F, generate
 553,  568,    1
*Nset, nset=SOIL_BOTNODES
   1,   4,   5,   8,   9,  11
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*Nset, nset=LEFT_NODES
   3,   4, 101, 102, 103, 104
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*Nset, nset=RIGHT_NODES
   9,  10, 394, 395, 396, 397
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*Elset, elset=_SURF-S-F_S2, internal, generate
 6180,  7080,    60
*Nset, nset=UNDERFNS
  561,  598, 6990, 6991, 6992, 6993
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*Elset, elset=_SURF-S-F_S2_1, internal, generate
 6420,  6840,    60
*Elset, elset=_SURF-S-F_S2_2, internal, generate
 6420,  6840,    60
*Surface, type=ELEMENT, name=SURF-S-F
_SURF-S-F_S2_2, S2
** Section: Section-3-SOIL
*Solid Section, elset=SOIL, material=SOIL
,
*End Part
**
**
** ASSEMBLY
**
*Assembly, name=Assembly
**
*Instance, name=SOIL-1, part=SOIL
         14.,           0.,           0.
*End Instance
**
*Instance, name=FOOTING-1, part=FOOTING
         63.,        19.25,           0.
*End Instance
**
*Node
      1,          69.,         25.5
*MPC
BEAM, SOIL-1.394, SOIL-1.159
BEAM, SOIL-1.395, SOIL-1.158
BEAM, SOIL-1.396, SOIL-1.157
BEAM, SOIL-1.397, SOIL-1.156
BEAM, SOIL-1.398, SOIL-1.155
BEAM, SOIL-1.399, SOIL-1.154
BEAM, SOIL-1.400, SOIL-1.153
BEAM, SOIL-1.401, SOIL-1.152
BEAM, SOIL-1.402, SOIL-1.151
BEAM, SOIL-1.403, SOIL-1.150
BEAM, SOIL-1.404, SOIL-1.149
BEAM, SOIL-1.405, SOIL-1.148
BEAM, SOIL-1.406, SOIL-1.147
BEAM, SOIL-1.407, SOIL-1.146
BEAM, SOIL-1.408, SOIL-1.145
BEAM, SOIL-1.409, SOIL-1.144
BEAM, SOIL-1.410, SOIL-1.143
BEAM, SOIL-1.411, SOIL-1.142
BEAM, SOIL-1.412, SOIL-1.141
BEAM, SOIL-1.413, SOIL-1.140
BEAM, SOIL-1.414, SOIL-1.139
BEAM, SOIL-1.415, SOIL-1.138
BEAM, SOIL-1.416, SOIL-1.137
BEAM, SOIL-1.417, SOIL-1.136
BEAM, SOIL-1.418, SOIL-1.135
BEAM, SOIL-1.419, SOIL-1.134
BEAM, SOIL-1.420, SOIL-1.133
BEAM, SOIL-1.421, SOIL-1.132
BEAM, SOIL-1.422, SOIL-1.131
BEAM, SOIL-1.423, SOIL-1.130
BEAM, SOIL-1.424, SOIL-1.129
BEAM, SOIL-1.425, SOIL-1.128
BEAM, SOIL-1.426, SOIL-1.127
BEAM, SOIL-1.427, SOIL-1.126
BEAM, SOIL-1.428, SOIL-1.125
BEAM, SOIL-1.429, SOIL-1.124
BEAM, SOIL-1.430, SOIL-1.123
BEAM, SOIL-1.431, SOIL-1.122
BEAM, SOIL-1.432, SOIL-1.121
BEAM, SOIL-1.433, SOIL-1.120
BEAM, SOIL-1.434, SOIL-1.119
BEAM, SOIL-1.435, SOIL-1.118
BEAM, SOIL-1.436, SOIL-1.117
BEAM, SOIL-1.437, SOIL-1.116
BEAM, SOIL-1.438, SOIL-1.115
BEAM, SOIL-1.439, SOIL-1.114
BEAM, SOIL-1.440, SOIL-1.113
BEAM, SOIL-1.441, SOIL-1.112
BEAM, SOIL-1.442, SOIL-1.111
BEAM, SOIL-1.443, SOIL-1.110
BEAM, SOIL-1.444, SOIL-1.109
BEAM, SOIL-1.445, SOIL-1.108
BEAM, SOIL-1.446, SOIL-1.107
BEAM, SOIL-1.447, SOIL-1.106
BEAM, SOIL-1.448, SOIL-1.105
BEAM, SOIL-1.449, SOIL-1.104
BEAM, SOIL-1.450, SOIL-1.103
BEAM, SOIL-1.451, SOIL-1.102
BEAM, SOIL-1.452, SOIL-1.101
BEAM, SOIL-1.10, SOIL-1.3
*MPC
BEAM, FOOTING-1.5, FOOTING-1.10
BEAM, FOOTING-1.21, FOOTING-1.9
BEAM, FOOTING-1.22, FOOTING-1.8
BEAM, FOOTING-1.23, FOOTING-1.7
BEAM, 1, FOOTING-1.5
BEAM, FOOTING-1.18, FOOTING-1.21
BEAM, FOOTING-1.19, FOOTING-1.22
BEAM, FOOTING-1.20, FOOTING-1.23
BEAM, FOOTING-1.6, 1
*Nset, nset=S_UNDER, instance=SOIL-1, generate
 5986,  8051,    59
*Nset, nset=S_UNDER2, instance=SOIL-1, generate
 6985,  6989,     1
*Nset, nset=WIRE-1-SET-1, instance=SOIL-1
   3,  10, 101, 102, 103, 104
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*Nset, nset=WIRE-2-SET-1, instance=FOOTING-1
 1, 5, 6
*Nset, nset=Wire-1-Set-1, instance=SOIL-1
   3,  10, 101, 102, 103, 104
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*Nset, nset=Wire-2-Set-1
 1,
*Nset, nset=Wire-2-Set-1, instance=FOOTING-1
  5,  6,  7,  8,  9, 10, 18, 19, 20, 21, 22, 23
*Nset, nset=talpa, instance=FOOTING-1
 4,
*Nset, nset=_PICKEDSET21, internal
 1,
*Elset, elset=_SURF-LOAD_S2, internal, instance=SOIL-1, generate
 5460,  5880,    60
*Elset, elset=_SURF-LOAD_S2_1, internal, instance=SOIL-1, generate
 5460,  5880,    60
*Elset, elset=_SURF-LOAD_S4, internal, instance=SOIL-1, generate
 7801,  8101,    60
*Elset, elset=_SURF-LOAD_S4_1, internal, instance=SOIL-1, generate
 7801,  8101,    60
*Elset, elset=_SURF-LOAD_S2_2, internal, instance=SOIL-1, generate
 5460,  5880,    60
*Elset, elset=_SURF-LOAD_S4_2, internal, instance=SOIL-1, generate
 7801,  8101,    60
*Surface, type=ELEMENT, name=SURF-LOAD
_SURF-LOAD_S2_2, S2
_SURF-LOAD_S4_2, S4
*End Assembly
*Amplitude, name=EQ
             0.,           0.006,           0.005,          0.0044,            0.01,          0.0027,           0.015,         -0.0002
           0.02,         -0.0015,           0.025,         -0.0002,            0.03,          0.0023,           0.035,          0.0054
           0.04,          0.0077,           0.045,          0.0081,            0.05,          0.0068,           0.055,          0.0048
           0.06,          0.0027,           0.065,           0.001,            0.07,          0.0002,           0.075,          0.0004
           0.08,          0.0017,           0.085,          0.0033,            0.09,           0.005,           0.095,          0.0058
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            10.,          0.0168
*Amplitude, name=LOAD
             0.,              0.,             0.1,             0.1,             0.3,             0.3,             0.5,             0.5
            0.7,             0.7,             0.9,             0.9,              1.,              1.
*Amplitude, name=Sinusoidal_1Hz
             0.,              0.,            0.01,      0.06279052,            0.02,     0.125333234,            0.03,     0.187381315
           0.04,     0.248689887,            0.05,     0.309016994,            0.06,     0.368124553,            0.07,     0.425779292
           0.08,     0.481753674,            0.09,     0.535826795,             0.1,     0.587785252,            0.11,      0.63742399
           0.12,     0.684547106,            0.13,     0.728968627,            0.14,     0.770513243,            0.15,     0.809016994
           0.16,     0.844327926,            0.17,      0.87630668,            0.18,     0.904827052,            0.19,     0.929776486
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            10.,     -2.4503e-15
**
** MATERIALS
**
*Material, name=FOOTING
*Density
2.,
*Elastic
 1e+08, 0.25
*Material, name=PIER
*Density
 0.1,
*Elastic
 1e+09, 0.2
*Material, name=SOIL
*Damping, beta=0.00173
*Density
 1.8,
*Depvar
      2,
*Elastic, dependencies=2
  7080.,   0.48, ,     0.,     0.
  7080.,   0.48, ,  7080.,     0.
 10040.,   0.48, , 10040.,     0.
 13000.,   0.48, , 13000.,     0.
 15960.,   0.48, , 15960.,     0.
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181720.,   0.48, ,181720.,     0.
*Plastic, dependencies=2, hardening=COMBINED, datatype=PARAMETERS, number backstresses=1
  0.61,  7080.,  1283., ,     0.,     0.
  0.61,  7080.,  1283., ,     0.,   6.13
  0.87, 10040.,  1283., ,     0.,   8.69
  1.13, 13000.,  1283., ,     0.,  11.26
  1.38, 15960.,  1283., ,     0.,  13.82
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 15.74,181720.,  1283., ,     0., 157.37
*User Defined Field
**
** INTERACTION PROPERTIES
**
*Surface Interaction, name=INTPROP-1
1.,
*Friction, slip tolerance=0.005, taumax=7.
10.,
*Surface Behavior, pressure-overclosure=EXPONENTIAL
1e-06, 10.
**
** INTERACTIONS
**
** Interaction: INTPROP-1-1
*Contact Pair, interaction=INTPROP-1, small sliding, type=SURFACE TO SURFACE, adjust=0.0
SOIL-1.SURF-S-F, FOOTING-1.SURF-FS
** ----------------------------------------------------------------
**
** STEP: Geostatic
**
*Step, name=Geostatic, nlgeom=NO
Establishing geostatic stresses
*Geostatic, utol
0.1, 1., 1e-05, 0.1
**
** BOUNDARY CONDITIONS
**
** Name: Disp-BC-1 Type: Displacement/Rotation
*Boundary
FOOTING-1.MASS, 1, 1
** Name: Disp-BC-2 Type: Displacement/Rotation
*Boundary
SOIL-1.SOIL_BOTNODES, 1, 1
** Name: Disp-BC-3 Type: Displacement/Rotation
*Boundary
SOIL-1.SOIL_BOTNODES, 2, 2
**
** LOADS
**
** Name: GRAVITY-1   Type: Gravity
*Dload, op=NEW
SOIL-1.SOIL, GRAV, 9.81, 0., -1.
**
** OUTPUT REQUESTS
**
*Restart, write, frequency=0
**
** FIELD OUTPUT: F-Output-1
**
*Output, field
*Contact Output
CDISP, CFORCE, CSTRESS
**
** FIELD OUTPUT: F-Output-2
**
*Node Output
CF, RF, U, V
**
** FIELD OUTPUT: F-Output-3
**
*Element Output, directions=YES
E, EE, PE, PEEQ, S
**
** HISTORY OUTPUT: H-Output-1
**
*Output, history, variable=PRESELECT
*End Step
** ----------------------------------------------------------------
**
** STEP: Self_weight
**
*Step, name=Self_weight, nlgeom=NO, inc=1000000
Apply self weight
*Static
0.05, 1., 1e-05, 0.05
**
** BOUNDARY CONDITIONS
**
** Name: Disp-BC-1 Type: Displacement/Rotation
*Boundary, op=NEW
** Name: Disp-BC-2 Type: Displacement/Rotation
*Boundary, op=NEW
** Name: Disp-BC-3 Type: Displacement/Rotation
*Boundary, op=NEW
** Name: Disp-BC-4 Type: Displacement/Rotation
*Boundary, op=NEW
FOOTING-1.MASS, 1, 1
** Name: Disp-BC-5 Type: Displacement/Rotation
*Boundary, op=NEW
SOIL-1.SOIL_BOTNODES, 1, 1
** Name: Disp-BC-6 Type: Displacement/Rotation
*Boundary, op=NEW
SOIL-1.SOIL_BOTNODES, 2, 2
**
** LOADS
**
** Name: GRAVITY-1   Type: Gravity
*Dload, op=NEW
** Name: GRAVITY-2   Type: Gravity
*Dload, op=NEW
SOIL-1.SOIL, GRAV, 9.81, 0., -1.
** Name: GRAVITY-3   Type: Gravity
*Dload, op=NEW
FOOTING-1.FOOTING, GRAV, 0.05, 0., -1.
**
** OUTPUT REQUESTS
**
*Restart, write, frequency=0
**
** FIELD OUTPUT: F-Output-4
**
*Output, field
*Contact Output
CDISP, CSTRESS
**
** FIELD OUTPUT: F-Output-5
**
*Node Output
CF, RF, U, V
**
** FIELD OUTPUT: F-Output-6
**
*Element Output, directions=YES
E, S
**
** HISTORY OUTPUT: H-Output-2
**
*Output, history, variable=PRESELECT
*End Step
** ----------------------------------------------------------------
**
** STEP: Self_weight_footing
**
*Step, name=Self_weight_footing, nlgeom=NO, inc=10000
*Static
0.1, 1., 1e-05, 0.1
**
** BOUNDARY CONDITIONS
**
** Name: talpa_BC-9 Type: Displacement/Rotation
*Boundary
talpa, 1, 1
**
** LOADS
**
** Name: CFORCE-1   Type: Concentrated force
*Cload, amplitude=LOAD
FOOTING-1.MASS, 2, -110.
** Name: GRAVITY-2   Type: Gravity
*Dload, op=NEW
** Name: GRAVITY-3   Type: Gravity
*Dload, op=NEW
** Name: GRAVITY-4   Type: Gravity
*Dload, op=NEW
FOOTING-1.FOOTING, GRAV, 9.81, 0., -1.
** Name: GRAVITY-5   Type: Gravity
*Dload, op=NEW
SOIL-1.SOIL, GRAV, 9.81, 0., -1.
** Name: surcharge   Type: Pressure
*Dsload
SURF-LOAD, P, 30.
**
** OUTPUT REQUESTS
**
*Restart, write, frequency=0
**
** FIELD OUTPUT: F-Output-7
**
*Output, field
*Contact Output
CDISP, CSTRESS
**
** FIELD OUTPUT: F-Output-8
**
*Node Output
CF, RF, U, V
*Element Output, directions=YES
NFORC, SF
**
** FIELD OUTPUT: F-Output-9
**
*Element Output, directions=YES
E, S
**
** HISTORY OUTPUT: H-Output-3
**
*Output, history, variable=PRESELECT
*End Step
** ----------------------------------------------------------------
**
** STEP: Step-3
**
*Step, name=Step-3, nlgeom=NO, inc=100000000
Dynamic
*Dynamic,alpha=0.
0.01,10.,0.01
**
** BOUNDARY CONDITIONS
**
** Name: Acc-BC-1 Type: Acceleration/Angular acceleration
*Boundary, op=NEW, amplitude=EQ, type=ACCELERATION
SOIL-1.SOIL_BOTNODES, 1, 1, 5.
** Name: Disp-BC-4 Type: Displacement/Rotation
*Boundary, op=NEW
** Name: Disp-BC-5 Type: Displacement/Rotation
*Boundary, op=NEW
** Name: Disp-BC-6 Type: Displacement/Rotation
*Boundary, op=NEW
** Name: Disp-BC-7 Type: Displacement/Rotation
*Boundary, op=NEW
SOIL-1.SOIL_BOTNODES, 2, 2
** Name: talpa_BC-9 Type: Displacement/Rotation
*Boundary, op=NEW
**
** LOADS
**
** Name: CFORCE-1   Type: Concentrated force
*Cload, amplitude=LOAD
FOOTING-1.MASS, 2, -110.
** Name: GRAVITY-4   Type: Gravity
*Dload, op=NEW
** Name: GRAVITY-5   Type: Gravity
*Dload, op=NEW
** Name: GRAVITY-6   Type: Gravity
*Dload, op=NEW
FOOTING-1.FOOTING, GRAV, 9.81, 0., -1.
** Name: GRAVITY-7   Type: Gravity
*Dload, op=NEW
SOIL-1.SOIL, GRAV, 9.81, 0., -1.
**
** OUTPUT REQUESTS
**
*Restart, write, frequency=0
**
** FIELD OUTPUT: F-Output-11
**
*Output, field, frequency=1
*Contact Output
CDISP, CSTRESS
**
** FIELD OUTPUT: F-Output-10
**
*Output, field, time interval=0.01
*Node Output
A, U, V
**
** FIELD OUTPUT: F-Output-14
**
*Node Output
CF, RF
*Element Output, directions=YES
SF,
**
** FIELD OUTPUT: F-Output-12
**
*Element Output, directions=YES
E, S
**
** HISTORY OUTPUT: H-Output-4
**
*Output, history, variable=PRESELECT, frequency=1
*End Step
