*Heading
** Job name: ChangeRP Model name: Real_ChangeRP
** Generated by: Abaqus/CAE 6.14-1
*Preprint, echo=NO, model=NO, history=NO, contact=NO
**
** PARTS
**
*Part, name=FOOTING
*Node
      1,          10.,           6.
      2,         9.75,           6.
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*Element, type=CPE4R
 1,  1,  2, 19, 18
 2,  2,  3, 20, 19
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*Nset, nset=FOOTING, generate
  1,  51,   1
*Elset, elset=FOOTING, generate
  1,  32,   1
*Nset, nset=F-SNODES, generate
 35,  51,   1
*Elset, elset=_SURF_FOOTINGBOT_S3, internal, generate
 17,  32,   1
*Elset, elset=_SURF-FTOP_S1, internal, generate
  1,  16,   1
*Surface, type=ELEMENT, name=SURF_FOOTINGBOT
_SURF_FOOTINGBOT_S3, S3
*Surface, type=ELEMENT, name=SURF-FTOP
_SURF-FTOP_S1, S1
** Section: Footing
*Solid Section, elset=FOOTING, material=FOOTING
,
*End Part
**
*Part, name=MASS
*Node
      1,           0.,           0.
*Nset, nset=MASS-REFPT_, internal
 1,
*Nset, nset=MASS
 1,
*Nset, nset=_PickedSet5, internal
 1,
*Element, type=MASS, elset=_PickedSet5_MASS_MASS__
1, 1
*Mass, elset=_PickedSet5_MASS_MASS__
10000.,
*End Part
**
*Part, name=PIER
*Node
      1,         10.5,         -0.5
      2,         10.5,         14.5
*Element, type=B21
1, 2, 1
*Nset, nset=PIER
 1, 2
*Elset, elset=PIER
 1,
*Elset, elset=_SURF-PIER_SPOS, internal
 1,
*Surface, type=ELEMENT, name=SURF-PIER
_SURF-PIER_SPOS, SPOS
** Section: Section-4  Profile: Profile-2
*Beam Section, elset=PIER, material=PIER, poisson = 0.33, temperature=GRADIENTS, section=CIRC
3.
0.,0.,-1.
*End Part
**
*Part, name=SOIL
*Node
      1,          59.,          30.
      2,          59.,          12.
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*Element, type=CINPE4
 1,  1, 25, 58,  4
 2, 25, 26, 57, 58
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*Element, type=CPE4R
  27,    7,   73,  442,  107
  28,   73,   74,  443,  442
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*Nset, nset=SET-1, generate
    1,  2241,     1
*Elset, elset=SET-1, generate
    1,  2132,     1
*Nset, nset=SOIL_BOTNODES
   2,   8,  11,  14,  17,  20
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*Nset, nset=S-F_NODES, generate
 288,  304,    1
*Elset, elset=_SURF_S-F_S4, internal, generate
 1363,  1483,     8
*Surface, type=ELEMENT, name=SURF_S-F
_SURF_S-F_S4, S4
** Section: Section-2-SET-1
*Solid Section, elset=SET-1, material=SOIL
,
*End Part
**
**
** ASSEMBLY
**
*Assembly, name=Assembly
**
*Instance, name=FOOTING-1, part=FOOTING
        44.5,         26.5,           0.
*End Instance
**
*Instance, name=MASS-1, part=MASS
        52.5,         47.5,           0.
*End Instance
**
*Instance, name=PIER-1, part=PIER
         42.,          33.,           0.
*End Instance
**
*Instance, name=SOIL-1, part=SOIL
        13.5,           0.,           0.
*End Instance
**
*Node
      1,         52.5,         32.5
*MPC
BEAM, SOIL-1.3, SOIL-1.22
BEAM, SOIL-1.42, SOIL-1.418
BEAM, SOIL-1.43, SOIL-1.417
BEAM, SOIL-1.44, SOIL-1.416
BEAM, SOIL-1.45, SOIL-1.415
BEAM, SOIL-1.46, SOIL-1.414
BEAM, SOIL-1.47, SOIL-1.413
BEAM, SOIL-1.48, SOIL-1.412
BEAM, SOIL-1.49, SOIL-1.411
BEAM, SOIL-1.50, SOIL-1.410
BEAM, SOIL-1.409, SOIL-1.51
BEAM, SOIL-1.52, SOIL-1.408
BEAM, SOIL-1.53, SOIL-1.407
BEAM, SOIL-1.54, SOIL-1.406
BEAM, SOIL-1.55, SOIL-1.405
BEAM, SOIL-1.56, SOIL-1.404
BEAM, SOIL-1.57, SOIL-1.403
BEAM, SOIL-1.58, SOIL-1.402
BEAM, SOIL-1.4, SOIL-1.441
BEAM, SOIL-1.66, SOIL-1.440
BEAM, SOIL-1.67, SOIL-1.439
BEAM, SOIL-1.68, SOIL-1.438
BEAM, SOIL-1.69, SOIL-1.437
BEAM, SOIL-1.70, SOIL-1.436
BEAM, SOIL-1.72, SOIL-1.435
BEAM, SOIL-1.6, SOIL-1.24
*Nset, nset=SET-1
 1,
*Nset, nset=Wire-1-Set-1, instance=SOIL-1
   3,   4,   6,  22,  24,  42
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*Nset, nset=MASS-1_MASS_CNS_, internal, instance=MASS-1
 1,
*Nset, nset=_PICKEDSET15, internal
 1,
*Nset, nset=_PickedSet14, internal
 1,
*Surface, type=NODE, name=MASS-1_MASS_CNS__CNS_, internal
MASS-1_MASS_CNS_, 1.
** Constraint: F-P-1
*Tie, name=F-P-1, adjust=yes, type=NODE TO SURFACE
MASS-1_MASS_CNS__CNS_, PIER-1.SURF-PIER
** Constraint: M-P
*Coupling, constraint name=M-P, ref node=MASS-1.MASS, surface=FOOTING-1.SURF-FTOP
*Distributing, weighting method=UNIFORM
1, 1
2, 2
6, 6
** Constraint: RigidBody-1
*Rigid Body, ref node=_PickedSet14, elset=FOOTING-1.FOOTING, position=CENTER OF MASS
*End Assembly
*Amplitude, name=EQ
             0.,          0.0072,           0.005,          0.0062,            0.01,          0.0046,           0.015,          0.0028
           0.02,         -0.0002,           0.025,         -0.0016,            0.03,         -0.0002,           0.035,          0.0024
           0.04,          0.0056,           0.045,           0.008,            0.05,          0.0084,           0.055,           0.007
           0.06,           0.005,           0.065,          0.0028,            0.07,           0.001,           0.075,          0.0002
           0.08,          0.0004,           0.085,          0.0018,            0.09,          0.0034,           0.095,          0.0052
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            10.,          0.0176
**
** MATERIALS
**
*Material, name=FOOTING
*Density
 1.8,
*Elastic
 1e+07, 0.3
*Material, name=PIER
*Density
2.,
*Elastic
 3e+07, 0.3
*Plastic
400000.,0.
*Material, name=SOIL
*Damping, beta=0.00173
*Density
 1.8,
*Depvar
      2,
*Elastic, dependencies=2
  8560.,   0.48, ,     0.,     0.
  8560.,   0.48, ,     0.,  8560.
 14480.,   0.48, ,     0., 14480.
 20400.,   0.48, ,     0., 20400.
 26320.,   0.48, ,     0., 26320.
 32240.,   0.48, ,     0., 32240.
 38160.,   0.48, ,     0., 38160.
 44080.,   0.48, ,     0., 44080.
 50000.,   0.48, ,     0., 50000.
 55920.,   0.48, ,     0., 55920.
 61840.,   0.48, ,     0., 61840.
 67760.,   0.48, ,     0., 67760.
 73680.,   0.48, ,     0., 73680.
 79600.,   0.48, ,     0., 79600.
 85520.,   0.48, ,     0., 85520.
 91440.,   0.48, ,     0., 91440.
 97360.,   0.48, ,     0., 97360.
103280.,   0.48, ,     0.,103280.
109200.,   0.48, ,     0.,109200.
115120.,   0.48, ,     0.,115120.
121040.,   0.48, ,     0.,121040.
126960.,   0.48, ,     0.,126960.
*Plastic, dependencies=2, hardening=COMBINED, datatype=PARAMETERS, number backstresses=1
  0.74,  8560.,  1283., ,     0.,     0.
  0.74,  8560.,  1283., ,     0.,   4.28
  1.25, 14480.,  1283., ,     0.,   7.24
  1.77, 20400.,  1283., ,     0.,   10.2
  2.28, 26320.,  1283., ,     0.,  13.16
  2.79, 32240.,  1283., ,     0.,  16.12
   3.3, 38160.,  1283., ,     0.,  19.08
  3.82, 44080.,  1283., ,     0.,  22.04
  4.33, 50000.,  1283., ,     0.,    25.
  4.84, 55920.,  1283., ,     0.,  27.96
  5.36, 61840.,  1283., ,     0.,  30.92
  5.87, 67760.,  1283., ,     0.,  33.88
  6.38, 73680.,  1283., ,     0.,  36.84
  6.89, 79600.,  1283., ,     0.,   39.8
  7.41, 85520.,  1283., ,     0.,  42.76
  7.92, 91440.,  1283., ,     0.,  45.72
  8.43, 97360.,  1283., ,     0.,  48.68
  8.94,103280.,  1283., ,     0.,  51.64
  9.46,109200.,  1283., ,     0.,   54.6
  9.97,115120.,  1283., ,     0.,  57.56
 10.48,121040.,  1283., ,     0.,  60.52
   11.,126960.,  1283., ,     0.,  63.48
*User Defined Field
**
** INTERACTION PROPERTIES
**
*Surface Interaction, name=NT
1.,
*Friction, slip tolerance=0.001, taumax=5.
 0.9,
*Surface Behavior, pressure-overclosure=EXPONENTIAL
1e-05, 10.
**
** INTERACTIONS
**
** Interaction: NT-1
*Contact Pair, interaction=NT, small sliding, type=SURFACE TO SURFACE, adjust=0.001
SOIL-1.SURF_S-F, FOOTING-1.SURF_FOOTINGBOT
** ----------------------------------------------------------------
**
** STEP: Gravity
**
*Step, name=Gravity, nlgeom=NO, inc=100000
Grav
*Static
0.01, 1., 1e-05, 0.01
**
** BOUNDARY CONDITIONS
**
** Name: Disp-BC-1 Type: Displacement/Rotation
*Boundary
SOIL-1.SOIL_BOTNODES, 1, 1
** Name: Disp-BC-2 Type: Displacement/Rotation
*Boundary
SOIL-1.SOIL_BOTNODES, 2, 2
SOIL-1.SOIL_BOTNODES, 6, 6
** Name: Disp-BC-3 Type: Displacement/Rotation
*Boundary
SET-1, 2, 2
** Name: Disp-BC-4 Type: Displacement/Rotation
*Boundary
MASS-1.MASS, 2, 2
**
** LOADS
**
** Name: Load-1   Type: Concentrated force
*Cload
MASS-1.MASS, 1, 10.
**
** OUTPUT REQUESTS
**
*Restart, write, frequency=0
**
** FIELD OUTPUT: F-Output-1
**
*Output, field
*Contact Output
CDISP, CDSTRESS, CFORCE, CSTRESS, CSTRESSETOS
**
** FIELD OUTPUT: F-Output-2
**
*Node Output
CF, RF, RM, RT
**
** FIELD OUTPUT: F-Output-3
**
*Element Output, directions=YES
GRAV, P
**
** FIELD OUTPUT: F-Output-4
**
*Node Output
U, UR, UT
**
** FIELD OUTPUT: F-Output-5
**
*Output, field, frequency=10
*Element Output, directions=YES
E, S
**
** HISTORY OUTPUT: H-Output-1
**
*Output, history, variable=PRESELECT
*End Step
