*Heading
** Job name: Dashpotszz Model name: Dashpots
** Generated by: Abaqus/CAE 6.14-1
*Preprint, echo=NO, model=NO, history=NO, contact=NO
**
** PARTS
**
*Part, name=FOOTING
*Node
      1,        13.75,        18.25
      2,          14.,        18.25
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*Element, type=CPE4R
 1,  1,  2, 19, 18
 2,  2,  3, 20, 19
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*Nset, nset=FOOTING-RefPt_, internal
 35,
*Nset, nset=FOOTING-REFPT_, internal
 35,
*Nset, nset=FOOTING, generate
  1,  34,   1
*Elset, elset=FOOTING, generate
  1,  16,   1
*Nset, nset=SET-7
 35,
*Elset, elset=_SURF-F-S_S1, internal, generate
  1,  16,   1
*Nset, nset=_PICKEDSET9, internal
 35,
*Surface, type=ELEMENT, name=SURF-F-S
_SURF-F-S_S1, S1
** Section: Section-1-FOOTING
*Solid Section, elset=FOOTING, material=FOOTING
,
*End Part
**
*Part, name=SOIL
*Node
      1,        21.25,           0.
      2,        21.25,          30.
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*Element, type=CPE4R
   1,    1,   13,  397,   98
   2,   13,   14,  398,  397
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*Nset, nset=SET-1, generate
    1,  3441,     1
*Elset, elset=SET-1, generate
    1,  3300,     1
*Nset, nset=S_BOTNODES
   1,   4,   5,   8,   9,  11
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*Nset, nset=S_LEFT
  3,  4, 56, 57, 58, 59
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*Nset, nset=S_RIGHT
   9,  10, 209, 210, 211, 212
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*Elset, elset=_SURF-S-F_S2, internal, generate
 1890,  2340,    30
*Nset, nset=S-F, generate
 292,  308,    1
*Nset, nset=_PICKEDSET10, internal
  3, 10
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*Surface, type=ELEMENT, name=SURF-S-F
_SURF-S-F_S2, S2
** Section: Section-2-SET-1
*Solid Section, elset=SET-1, material=SOIL
,
*Dashpot, elset=SPRINGS/DASHPOTS-1--dashpot
2
36.
*Element, type=Dashpot1, elset=SPRINGS/DASHPOTS-1--dashpot
3301, 3
3302, 10
*Dashpot, elset=SPRINGS/DASHPOTS-2--dashpot
2
94.
*Element, type=Dashpot1, elset=SPRINGS/DASHPOTS-2--dashpot
3303, 56
3304, 237
*Dashpot, elset=SPRINGS/DASHPOTS-3--dashpot
2
110.
*Element, type=Dashpot1, elset=SPRINGS/DASHPOTS-3--dashpot
3305, 57
3306, 236
*Dashpot, elset=SPRINGS/DASHPOTS-4--dashpot
2
127.
*Element, type=Dashpot1, elset=SPRINGS/DASHPOTS-4--dashpot
3307, 58
3308, 235
*Dashpot, elset=SPRINGS/DASHPOTS-5--dashpot
2
140.
*Element, type=Dashpot1, elset=SPRINGS/DASHPOTS-5--dashpot
3309, 59
3310, 234
*Dashpot, elset=SPRINGS/DASHPOTS-6--dashpot
2
156.
*Element, type=Dashpot1, elset=SPRINGS/DASHPOTS-6--dashpot
3311, 60
3312, 233
*Dashpot, elset=SPRINGS/DASHPOTS-7--dashpot
2
164.
*Element, type=Dashpot1, elset=SPRINGS/DASHPOTS-7--dashpot
3313, 61
3314, 232
*Dashpot, elset=SPRINGS/DASHPOTS-8--dashpot
2
174.
*Element, type=Dashpot1, elset=SPRINGS/DASHPOTS-8--dashpot
3315, 62
3316, 231
*Dashpot, elset=SPRINGS/DASHPOTS-9--dashpot
2
184.
*Element, type=Dashpot1, elset=SPRINGS/DASHPOTS-9--dashpot
3317, 63
3318, 230
*Dashpot, elset=SPRINGS/DASHPOTS-10--dashpot
2
194.
*Element, type=Dashpot1, elset=SPRINGS/DASHPOTS-10--dashpot
3319, 64
3320, 229
*Dashpot, elset=SPRINGS/DASHPOTS-11--dashpot
2
203.
*Element, type=Dashpot1, elset=SPRINGS/DASHPOTS-11--dashpot
3321, 65
3322, 228
*Dashpot, elset=SPRINGS/DASHPOTS-12--dashpot
2
212.
*Element, type=Dashpot1, elset=SPRINGS/DASHPOTS-12--dashpot
3323, 66
3324, 227
*Dashpot, elset=SPRINGS/DASHPOTS-13--dashpot
2
220.
*Element, type=Dashpot1, elset=SPRINGS/DASHPOTS-13--dashpot
3325, 67
3326, 226
*Dashpot, elset=SPRINGS/DASHPOTS-14--dashpot
2
228.
*Element, type=Dashpot1, elset=SPRINGS/DASHPOTS-14--dashpot
3327, 68
3328, 225
*Dashpot, elset=SPRINGS/DASHPOTS-15--dashpot
2
236.
*Element, type=Dashpot1, elset=SPRINGS/DASHPOTS-15--dashpot
3329, 69
3330, 224
*Dashpot, elset=SPRINGS/DASHPOTS-16--dashpot
2
243.
*Element, type=Dashpot1, elset=SPRINGS/DASHPOTS-16--dashpot
3331, 70
3332, 223
*Dashpot, elset=SPRINGS/DASHPOTS-17--dashpot
2
251.
*Element, type=Dashpot1, elset=SPRINGS/DASHPOTS-17--dashpot
3333, 71
3334, 222
*Dashpot, elset=SPRINGS/DASHPOTS-18--dashpot
2
258.
*Element, type=Dashpot1, elset=SPRINGS/DASHPOTS-18--dashpot
3335, 72
3336, 221
*Dashpot, elset=SPRINGS/DASHPOTS-19--dashpot
2
265.
*Element, type=Dashpot1, elset=SPRINGS/DASHPOTS-19--dashpot
3337, 73
3338, 220
*Dashpot, elset=SPRINGS/DASHPOTS-20--dashpot
2
271.
*Element, type=Dashpot1, elset=SPRINGS/DASHPOTS-20--dashpot
3339, 74
3340, 219
*Dashpot, elset=SPRINGS/DASHPOTS-21-dashpot
2
284.
*Element, type=Dashpot1, elset=SPRINGS/DASHPOTS-21-dashpot
3341, 75
3342, 218
*Dashpot, elset=SPRINGS/DASHPOTS-22--dashpot
2
291.
*Element, type=Dashpot1, elset=SPRINGS/DASHPOTS-22--dashpot
3343, 76
3344, 217
*Dashpot, elset=SPRINGS/DASHPOTS-23--dashpot
2
297.
*Element, type=Dashpot1, elset=SPRINGS/DASHPOTS-23--dashpot
3345, 77
3346, 216
*Dashpot, elset=SPRINGS/DASHPOTS-24--dashpot
2
303.
*Element, type=Dashpot1, elset=SPRINGS/DASHPOTS-24--dashpot
3347, 78
3348, 215
*Dashpot, elset=SPRINGS/DASHPOTS-25--dashpot
2
309.
*Element, type=Dashpot1, elset=SPRINGS/DASHPOTS-25--dashpot
3349, 79
3350, 214
*Dashpot, elset=SPRINGS/DASHPOTS-26--dashpot
2
314.
*Element, type=Dashpot1, elset=SPRINGS/DASHPOTS-26--dashpot
3351, 80
3352, 213
*Dashpot, elset=SPRINGS/DASHPOTS-27--dashpot
2
320.
*Element, type=Dashpot1, elset=SPRINGS/DASHPOTS-27--dashpot
3353, 81
3354, 212
*Dashpot, elset=SPRINGS/DASHPOTS-28--dashpot
2
326.
*Element, type=Dashpot1, elset=SPRINGS/DASHPOTS-28--dashpot
3355, 82
3356, 211
*Dashpot, elset=SPRINGS/DASHPOTS-29--dashpot
2
331.
*Element, type=Dashpot1, elset=SPRINGS/DASHPOTS-29--dashpot
3357, 83
3358, 210
*Dashpot, elset=SPRINGS/DASHPOTS-30--dashpot
2
336.
*Element, type=Dashpot1, elset=SPRINGS/DASHPOTS-30--dashpot
3359, 84
3360, 209
*End Part
**
**
** ASSEMBLY
**
*Assembly, name=Assembly
**
*Instance, name=FOOTING-1, part=FOOTING
         38.,        11.75,           0.
*End Instance
**
*Instance, name=SOIL-1, part=SOIL
        17.5,           0.,           0.
*End Instance
**
*MPC
BEAM, SOIL-1.10, SOIL-1.3
BEAM, SOIL-1.237, SOIL-1.56
BEAM, SOIL-1.236, SOIL-1.57
BEAM, SOIL-1.235, SOIL-1.58
BEAM, SOIL-1.234, SOIL-1.59
BEAM, SOIL-1.233, SOIL-1.60
BEAM, SOIL-1.232, SOIL-1.61
BEAM, SOIL-1.231, SOIL-1.62
BEAM, SOIL-1.230, SOIL-1.63
BEAM, SOIL-1.229, SOIL-1.64
BEAM, SOIL-1.228, SOIL-1.65
BEAM, SOIL-1.227, SOIL-1.66
BEAM, SOIL-1.226, SOIL-1.67
BEAM, SOIL-1.225, SOIL-1.68
BEAM, SOIL-1.224, SOIL-1.69
BEAM, SOIL-1.223, SOIL-1.70
BEAM, SOIL-1.222, SOIL-1.71
BEAM, SOIL-1.221, SOIL-1.72
BEAM, SOIL-1.220, SOIL-1.73
BEAM, SOIL-1.219, SOIL-1.74
BEAM, SOIL-1.218, SOIL-1.75
BEAM, SOIL-1.217, SOIL-1.76
BEAM, SOIL-1.216, SOIL-1.77
BEAM, SOIL-1.215, SOIL-1.78
BEAM, SOIL-1.214, SOIL-1.79
BEAM, SOIL-1.213, SOIL-1.80
BEAM, SOIL-1.212, SOIL-1.81
BEAM, SOIL-1.211, SOIL-1.82
BEAM, SOIL-1.210, SOIL-1.83
BEAM, SOIL-1.209, SOIL-1.84
*Nset, nset=UNDERFOOTING, instance=SOIL-1, generate
 1991,  2745,    29
*Nset, nset=VERTICAL_UNDER, instance=SOIL-1, generate
 2330,  2339,     1
*Nset, nset=WIRE-1-SET-1, instance=SOIL-1
   3,  10,  57,  58,  59,  60
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*Nset, nset=SOIL-1_S-F_CNS_, internal, instance=SOIL-1, generate
 292,  308,    1
*Nset, nset=SOIL-1_S-F_CNS__CNS_, internal, instance=SOIL-1, generate
 292,  308,    1
*Surface, type=NODE, name=SOIL-1_S-F_CNS__CNS__CNS_, internal
SOIL-1_S-F_CNS__CNS_, 1.
** Constraint: RigidBody-1
*Rigid Body, ref node=FOOTING-1.SET-7, elset=FOOTING-1.FOOTING, position=CENTER OF MASS
*End Assembly
*Amplitude, name=AMP-0
             0.,              0.,           0.005,       -6.98e-18,            0.01,       -1.16e-17,           0.015,       -9.25e-18
           0.02,       -4.87e-18,           0.025,       -5.48e-18,            0.03,       -5.76e-18,           0.035,       -7.83e-18
           0.04,          -1e-17,           0.045,       -1.01e-17,            0.05,       -1.25e-17,           0.055,       -1.72e-17
           0.06,        -2.2e-17,           0.065,       -2.19e-17,            0.07,       -2.38e-17,           0.075,       -2.32e-17
           0.08,       -2.02e-17,           0.085,       -1.56e-17,            0.09,        -4.7e-18,           0.095,        3.99e-18
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            10.,          0.0361
*Amplitude, name=AMP-1
             0.,              0.,           0.005,       -6.66e-20,            0.01,       -1.33e-19,           0.015,        9.66e-19
           0.02,       -3.76e-18,           0.025,       -1.44e-17,            0.03,       -1.93e-17,           0.035,       -1.49e-17
           0.04,       -1.27e-17,           0.045,       -1.37e-17,            0.05,       -1.59e-17,           0.055,       -1.68e-17
           0.06,        -1.9e-17,           0.065,       -1.76e-17,            0.07,       -9.52e-18,           0.075,        1.58e-18
           0.08,        1.33e-17,           0.085,        1.13e-17,            0.09,       -8.16e-19,           0.095,       -1.16e-17
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            10.,          0.0362
*Amplitude, name=AMP-2
             0.,              0.,           0.005,        4.65e-18,            0.01,        6.98e-18,           0.015,        2.35e-18
           0.02,        -4.5e-18,           0.025,       -1.14e-17,            0.03,       -1.81e-17,           0.035,       -2.69e-17
           0.04,       -2.66e-17,           0.045,       -2.23e-17,            0.05,       -1.37e-17,           0.055,       -7.08e-19
           0.06,        9.41e-18,           0.065,        1.73e-17,            0.07,        1.62e-17,           0.075,       -2.95e-18
           0.08,       -4.22e-17,           0.085,       -7.63e-17,            0.09,       -1.05e-16,           0.095,       -1.24e-16
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            10.,          0.0365
*Amplitude, name=AMP-3
             0.,              0.,           0.005,        1.26e-19,            0.01,        1.85e-19,           0.015,        3.69e-20
           0.02,        9.14e-18,           0.025,        2.29e-17,            0.03,        3.67e-17,           0.035,        5.01e-17
           0.04,        5.89e-17,           0.045,        4.89e-17,            0.05,        2.49e-17,           0.055,       -7.98e-18
           0.06,       -5.87e-17,           0.065,       -1.09e-16,            0.07,       -1.55e-16,           0.075,       -1.86e-16
           0.08,       -1.86e-16,           0.085,       -1.59e-16,            0.09,       -9.89e-17,           0.095,       -2.81e-17
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            10.,          0.0368
*Amplitude, name=AMP-4
             0.,              0.,           0.005,       -2.63e-19,            0.01,       -5.27e-19,           0.015,       -1.06e-18
           0.02,       -1.34e-18,           0.025,       -1.21e-18,            0.03,       -1.08e-18,           0.035,          -1e-17
           0.04,       -2.81e-17,           0.045,       -5.58e-17,            0.05,       -9.27e-17,           0.055,       -1.16e-16
           0.06,       -1.11e-16,           0.065,       -8.89e-17,            0.07,       -5.27e-17,           0.075,       -2.32e-18
           0.08,        3.03e-17,           0.085,        4.56e-17,            0.09,        6.27e-17,           0.095,        1.18e-16
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            10.,          0.0372
*Amplitude, name=AMP-5
             0.,              0.,           0.005,       -9.31e-18,            0.01,       -1.86e-17,           0.015,       -3.73e-17
           0.02,       -5.59e-17,           0.025,       -6.52e-17,            0.03,       -7.45e-17,           0.035,       -7.47e-17
           0.04,        -6.6e-17,           0.045,       -4.81e-17,            0.05,       -1.22e-17,           0.055,        3.34e-17
           0.06,        7.98e-17,           0.065,        8.98e-17,            0.07,        1.01e-16,           0.075,        1.05e-16
           0.08,        1.06e-16,           0.085,        1.28e-16,            0.09,         3.4e-16,           0.095,        1.24e-15
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            10.,          0.0374
*Amplitude, name=AMP-6
             0.,              0.,           0.005,        4.31e-23,            0.01,        5.09e-22,           0.015,       -2.66e-19
           0.02,       -5.31e-19,           0.025,        -5.3e-19,            0.03,       -5.29e-19,           0.035,       -8.01e-19
           0.04,       -7.99e-19,           0.045,       -5.22e-19,            0.05,       -9.01e-18,           0.055,       -1.72e-17
           0.06,       -2.52e-17,           0.065,       -2.29e-17,            0.07,        4.77e-18,           0.075,        9.48e-17
           0.08,         4.2e-16,           0.085,        1.52e-15,            0.09,        5.32e-15,           0.095,        1.82e-14
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            10.,          0.0372
*Amplitude, name=AMP-7
             0.,              0.,           0.005,        9.31e-18,            0.01,        1.86e-17,           0.015,         2.8e-17
           0.02,        3.73e-17,           0.025,        4.66e-17,            0.03,         5.6e-17,           0.035,        4.67e-17
           0.04,         3.8e-17,           0.045,        2.99e-17,            0.05,        2.26e-17,           0.055,        1.69e-17
           0.06,        1.63e-17,           0.065,        8.67e-17,            0.07,        3.91e-16,           0.075,        1.58e-15
           0.08,         6.1e-15,           0.085,        2.23e-14,            0.09,        7.78e-14,           0.095,        2.58e-13
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            10.,          0.0365
*Amplitude, name=AMP-8
             0.,              0.,           0.005,        3.15e-19,            0.01,        1.15e-18,           0.015,        1.95e-18
           0.02,        3.33e-18,           0.025,        4.72e-18,            0.03,        6.06e-18,           0.035,        7.94e-18
           0.04,         2.9e-17,           0.045,        6.92e-17,            0.05,        1.48e-16,           0.055,        2.82e-16
           0.06,        5.96e-16,           0.065,        1.75e-15,            0.07,        6.52e-15,           0.075,        2.53e-14
           0.08,        9.46e-14,           0.085,        3.34e-13,            0.09,        1.11e-12,           0.095,        3.51e-12
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            10.,          0.0355
*Amplitude, name=AMP-9
             0.,              0.,           0.005,        1.71e-18,            0.01,        2.16e-17,           0.015,        4.02e-17
           0.02,         7.9e-17,           0.025,        1.18e-16,            0.03,        1.56e-16,           0.035,        2.31e-16
           0.04,        3.26e-16,           0.045,        4.39e-16,            0.05,        5.85e-16,           0.055,         1.4e-15
           0.06,        5.87e-15,           0.065,        2.58e-14,            0.07,        1.06e-13,           0.075,        4.05e-13
           0.08,        1.44e-12,           0.085,        4.83e-12,            0.09,        1.52e-11,           0.095,         4.5e-11
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            10.,          0.0343
*Amplitude, name=AMP-10
             0.,              0.,           0.005,        5.96e-17,            0.01,        1.02e-16,           0.015,        1.03e-16
           0.02,        1.56e-16,           0.025,        2.27e-16,            0.03,        2.45e-16,           0.035,        2.55e-16
           0.04,        3.09e-16,           0.045,        9.71e-16,            0.05,        4.71e-15,           0.055,        2.32e-14
           0.06,        1.07e-13,           0.065,        4.49e-13,            0.07,        1.74e-12,           0.075,        6.25e-12
           0.08,         2.1e-11,           0.085,        6.58e-11,            0.09,        1.94e-10,           0.095,         5.4e-10
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            10.,          0.0331
*Amplitude, name=AMP-11
             0.,              0.,           0.005,        1.24e-16,            0.01,        2.68e-16,           0.015,        2.87e-16
           0.02,        1.62e-16,           0.025,        3.86e-17,            0.03,       -3.12e-18,           0.035,        2.29e-16
           0.04,        2.42e-15,           0.045,        1.56e-14,            0.05,        8.34e-14,           0.055,        3.97e-13
           0.06,        1.71e-12,           0.065,        6.75e-12,            0.07,        2.45e-11,           0.075,        8.25e-11
           0.08,        2.59e-10,           0.085,        7.58e-10,            0.09,        2.09e-09,           0.095,        5.42e-09
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            10.,          0.0322
*Amplitude, name=AMP-12
             0.,              0.,           0.005,       -1.42e-16,            0.01,       -2.29e-16,           0.015,       -2.11e-16
           0.02,       -1.77e-16,           0.025,        -1.2e-16,            0.03,        6.02e-16,           0.035,        6.03e-15
           0.04,        3.97e-14,           0.045,        2.23e-13,            0.05,         1.1e-12,           0.055,         4.9e-12
           0.06,        1.98e-11,           0.065,        7.28e-11,            0.07,        2.47e-10,           0.075,        7.74e-10
           0.08,        2.26e-09,           0.085,        6.17e-09,            0.09,        1.58e-08,           0.095,        3.81e-08
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            10.,          0.0318
*Amplitude, name=AMP-13
             0.,              0.,           0.005,       -8.07e-17,            0.01,       -1.54e-16,           0.015,       -1.63e-16
           0.02,       -8.76e-17,           0.025,        1.08e-15,            0.03,         1.1e-14,           0.035,        7.87e-14
           0.04,        4.73e-13,           0.045,        2.47e-12,            0.05,        1.14e-11,           0.055,        4.74e-11
           0.06,        1.78e-10,           0.065,         6.1e-10,            0.07,        1.92e-09,           0.075,        5.61e-09
           0.08,        1.52e-08,           0.085,        3.86e-08,            0.09,        9.16e-08,           0.095,        2.05e-07
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            10.,          0.0316
*Amplitude, name=AMP-14
             0.,              0.,           0.005,       -5.41e-17,            0.01,       -3.54e-17,           0.015,         7.8e-17
           0.02,        1.53e-15,           0.025,        1.59e-14,            0.03,        1.27e-13,           0.035,         8.3e-13
           0.04,        4.64e-12,           0.045,        2.26e-11,            0.05,         9.7e-11,           0.055,        3.74e-10
           0.06,         1.3e-09,           0.065,        4.15e-09,            0.07,        1.21e-08,           0.075,        3.28e-08
           0.08,        8.23e-08,           0.085,        1.93e-07,            0.09,        4.23e-07,           0.095,        8.71e-07
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            10.,          0.0316
*Amplitude, name=AMP-15
             0.,              0.,           0.005,        2.94e-17,            0.01,        1.15e-16,           0.015,        1.45e-15
           0.02,        1.78e-14,           0.025,        1.66e-13,            0.03,        1.22e-12,           0.035,        7.43e-12
           0.04,        3.85e-11,           0.045,        1.74e-10,            0.05,        6.93e-10,           0.055,        2.47e-09
           0.06,        7.99e-09,           0.065,        2.35e-08,            0.07,        6.34e-08,           0.075,        1.58e-07
           0.08,        3.66e-07,           0.085,        7.89e-07,            0.09,        1.59e-06,           0.095,        3.01e-06
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            10.,          0.0317
*Amplitude, name=AMP-16
             0.,              0.,           0.005,       -2.89e-18,            0.01,        8.22e-16,           0.015,        1.53e-14
           0.02,        1.76e-13,           0.025,        1.51e-12,            0.03,        1.02e-11,           0.035,        5.76e-11
           0.04,        2.76e-10,           0.045,        1.15e-09,            0.05,        4.24e-09,           0.055,         1.4e-08
           0.06,        4.15e-08,           0.065,        1.12e-07,            0.07,        2.79e-07,           0.075,        6.39e-07
           0.08,        1.36e-06,           0.085,        2.68e-06,            0.09,        4.94e-06,           0.095,        8.55e-06
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            10.,          0.0319
*Amplitude, name=AMP-17
             0.,              0.,           0.005,        3.05e-16,            0.01,        9.01e-15,           0.015,        1.44e-13
           0.02,        1.53e-12,           0.025,        1.21e-11,            0.03,        7.58e-11,           0.035,        3.93e-10
           0.04,        1.73e-09,           0.045,        6.64e-09,            0.05,        2.25e-08,           0.055,        6.79e-08
           0.06,        1.85e-07,           0.065,        4.58e-07,            0.07,        1.04e-06,           0.075,        2.18e-06
           0.08,        4.21e-06,           0.085,        7.59e-06,            0.09,        1.28e-05,           0.095,        2.01e-05
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            10.,          0.0322
*Amplitude, name=AMP-18
             0.,              0.,           0.005,        2.77e-15,            0.01,        8.32e-14,           0.015,        1.23e-12
           0.02,         1.2e-11,           0.025,        8.68e-11,            0.03,        4.99e-10,           0.035,        2.37e-09
           0.04,        9.58e-09,           0.045,        3.36e-08,            0.05,        1.04e-07,           0.055,        2.86e-07
           0.06,        7.09e-07,           0.065,         1.6e-06,            0.07,         3.3e-06,           0.075,        6.28e-06
           0.08,         1.1e-05,           0.085,         1.8e-05,            0.09,        2.74e-05,           0.095,        3.92e-05
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            10.,          0.0325
*Amplitude, name=AMP-19
             0.,              0.,           0.005,        2.61e-14,            0.01,        7.07e-13,           0.015,        9.55e-12
           0.02,        8.51e-11,           0.025,        5.63e-10,            0.03,        2.95e-09,           0.035,        1.28e-08
           0.04,        4.68e-08,           0.045,        1.49e-07,            0.05,        4.18e-07,           0.055,        1.04e-06
           0.06,        2.34e-06,           0.065,        4.78e-06,            0.07,        8.92e-06,           0.075,        1.53e-05
           0.08,        2.42e-05,           0.085,        3.57e-05,            0.09,        4.91e-05,           0.095,        6.38e-05
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            10.,          0.0328
*Amplitude, name=AMP-20
             0.,              0.,           0.005,        2.24e-13,            0.01,        5.56e-12,           0.015,        6.82e-11
           0.02,        5.51e-10,           0.025,         3.3e-09,            0.03,        1.56e-08,           0.035,        6.11e-08
           0.04,        2.03e-07,           0.045,        5.81e-07,            0.05,        1.47e-06,           0.055,        3.29e-06
           0.06,        6.65e-06,           0.065,        1.22e-05,            0.07,        2.03e-05,           0.075,        3.13e-05
           0.08,        4.45e-05,           0.085,        5.91e-05,            0.09,        7.39e-05,           0.095,        8.84e-05
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            10.,          0.0331
*Amplitude, name=AMP-21
             0.,              0.,           0.005,        1.82e-12,            0.01,        4.07e-11,           0.015,        4.49e-10
           0.02,        3.26e-09,           0.025,        1.75e-08,            0.03,        7.45e-08,           0.035,        2.61e-07
           0.04,        7.73e-07,           0.045,        1.98e-06,            0.05,        4.46e-06,           0.055,        8.93e-06
           0.06,        1.61e-05,           0.065,        2.62e-05,            0.07,         3.9e-05,           0.075,        5.35e-05
           0.08,        6.84e-05,           0.085,        8.26e-05,            0.09,        9.58e-05,           0.095,        0.000109
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            10.,          0.0334
*Amplitude, name=AMP-22
             0.,              0.,           0.005,        1.39e-11,            0.01,        2.78e-10,           0.015,        2.73e-09
           0.02,        1.76e-08,           0.025,        8.42e-08,            0.03,        3.18e-07,           0.035,        9.85e-07
           0.04,        2.59e-06,           0.045,        5.86e-06,            0.05,        1.17e-05,           0.055,        2.06e-05
           0.06,        3.27e-05,           0.065,        4.71e-05,            0.07,        6.23e-05,           0.075,        7.66e-05
           0.08,        8.94e-05,           0.085,        0.000101,            0.09,        0.000114,           0.095,        0.000131
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            10.,          0.0338
*Amplitude, name=AMP-23
             0.,              0.,           0.005,        1.01e-10,            0.01,        1.78e-09,           0.015,        1.53e-08
           0.02,         8.7e-08,           0.025,        3.64e-07,            0.03,         1.2e-06,           0.035,        3.27e-06
           0.04,         7.5e-06,           0.045,        1.48e-05,            0.05,        2.58e-05,           0.055,        3.98e-05
           0.06,        5.53e-05,           0.065,        7.03e-05,            0.07,        8.32e-05,           0.075,        9.41e-05
           0.08,        0.000105,           0.085,        0.000118,            0.09,        0.000138,           0.095,        0.000163
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            10.,          0.0341
*Amplitude, name=AMP-24
             0.,              0.,           0.005,        6.98e-10,            0.01,        1.06e-08,           0.015,        7.95e-08
           0.02,        3.89e-07,           0.025,        1.41e-06,            0.03,        4.01e-06,           0.035,        9.37e-06
           0.04,        1.85e-05,           0.045,        3.16e-05,            0.05,        4.73e-05,           0.055,        6.33e-05
           0.06,        7.71e-05,           0.065,        8.79e-05,            0.07,        9.68e-05,           0.075,        0.000107
           0.08,        0.000123,           0.085,        0.000146,            0.09,        0.000175,           0.095,        0.000208
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            10.,          0.0344
*Amplitude, name=AMP-25
             0.,              0.,           0.005,         4.6e-09,            0.01,        5.95e-08,           0.015,        3.77e-07
           0.02,        1.56e-06,           0.025,        4.77e-06,            0.03,        1.15e-05,           0.035,        2.27e-05
           0.04,         3.8e-05,           0.045,        5.51e-05,            0.05,        7.07e-05,           0.055,        8.24e-05
           0.06,        9.04e-05,           0.065,        9.78e-05,            0.07,        0.000109,           0.075,        0.000128
           0.08,        0.000155,           0.085,        0.000188,            0.09,        0.000221,           0.095,        0.000251
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            10.,          0.0348
*Amplitude, name=AMP-26
             0.,              0.,           0.005,        2.91e-08,            0.01,         3.1e-07,           0.015,        1.61e-06
           0.02,        5.49e-06,           0.025,        1.38e-05,            0.03,        2.75e-05,           0.035,        4.51e-05
           0.04,        6.29e-05,           0.045,         7.7e-05,            0.05,        8.56e-05,           0.055,        9.08e-05
           0.06,        9.76e-05,           0.065,        0.000111,            0.07,        0.000135,           0.075,        0.000166
           0.08,        0.000201,           0.085,        0.000234,            0.09,         0.00026,           0.095,        0.000278
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            10.,          0.0351
*Amplitude, name=AMP-27
             0.,              0.,           0.005,        1.77e-07,            0.01,        1.49e-06,           0.015,         6.1e-06
           0.02,        1.65e-05,           0.025,         3.3e-05,            0.03,        5.28e-05,           0.035,        7.05e-05
           0.04,        8.17e-05,           0.045,        8.65e-05,            0.05,        8.93e-05,           0.055,         9.7e-05
           0.06,        0.000115,           0.065,        0.000143,            0.07,        0.000178,           0.075,        0.000214
           0.08,        0.000245,           0.085,        0.000267,            0.09,        0.000281,           0.095,        0.000288
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            10.,          0.0354
*Amplitude, name=AMP-28
             0.,              0.,           0.005,        1.03e-06,            0.01,         6.4e-06,           0.015,        1.95e-05
           0.02,        3.97e-05,           0.025,        6.13e-05,            0.03,        7.73e-05,           0.035,        8.43e-05
           0.04,        8.49e-05,           0.045,        8.66e-05,            0.05,        9.68e-05,           0.055,        0.000119
           0.06,        0.000152,           0.065,         0.00019,            0.07,        0.000225,           0.075,        0.000253
           0.08,        0.000271,           0.085,        0.000281,            0.09,        0.000286,           0.095,        0.000291
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            10.,          0.0357
*Amplitude, name=AMP-29
             0.,              0.,           0.005,        5.92e-06,            0.01,        2.36e-05,           0.015,        4.84e-05
           0.02,        7.07e-05,           0.025,        8.29e-05,            0.03,        8.43e-05,           0.035,        8.13e-05
           0.04,        8.34e-05,           0.045,        9.76e-05,            0.05,        0.000126,           0.055,        0.000163
           0.06,        0.000202,           0.065,        0.000236,            0.07,         0.00026,           0.075,        0.000274
           0.08,         0.00028,           0.085,        0.000283,            0.09,        0.000287,           0.095,        0.000298
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            10.,           0.036
*Amplitude, name=AMP-30
             0.,              0.,           0.005,        3.35e-05,            0.01,        6.05e-05,           0.015,         7.9e-05
           0.02,        8.55e-05,           0.025,         8.1e-05,            0.03,        7.65e-05,           0.035,         8.2e-05
           0.04,        0.000102,           0.045,        0.000136,            0.05,        0.000177,           0.055,        0.000216
           0.06,        0.000246,           0.065,        0.000265,            0.07,        0.000275,           0.075,        0.000278
           0.08,        0.000279,           0.085,        0.000285,            0.09,        0.000298,           0.095,        0.000319
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            10.,          0.0363
*Amplitude, name=EQ
             0.,          0.0072,           0.005,          0.0062,            0.01,          0.0046,           0.015,          0.0028
           0.02,         -0.0002,           0.025,         -0.0016,            0.03,         -0.0002,           0.035,          0.0024
           0.04,          0.0056,           0.045,           0.008,            0.05,          0.0084,           0.055,           0.007
           0.06,           0.005,           0.065,          0.0028,            0.07,           0.001,           0.075,          0.0002
           0.08,          0.0004,           0.085,          0.0018,            0.09,          0.0034,           0.095,          0.0052
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            10.,          0.0176
**
** MATERIALS
**
*Material, name=FOOTING
*Density
2.,
*Elastic
10000., 0.3
*Material, name=SOIL
*Damping, beta=0.00173
*Density
 1.8,
*Depvar
      2,
*Elastic, dependencies=2
  8560.,   0.48, ,     0.,     0.
  8560.,   0.48, ,     0.,  8560.
 14480.,   0.48, ,     0., 14480.
 20400.,   0.48, ,     0., 20400.
 26320.,   0.48, ,     0., 26320.
 32240.,   0.48, ,     0., 32240.
 38160.,   0.48, ,     0., 38160.
 44080.,   0.48, ,     0., 44080.
 50000.,   0.48, ,     0., 50000.
 55920.,   0.48, ,     0., 55920.
 61840.,   0.48, ,     0., 61840.
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186160.,   0.48, ,     0.,186160.
*Plastic, dependencies=2, hardening=COMBINED, datatype=PARAMETERS, number backstresses=1
  0.74,  8560.,  1283., ,     0.,     0.
  0.74,  8560.,  1283., ,     0.,   4.28
  1.25, 14480.,  1283., ,     0.,   7.24
  1.77, 20400.,  1283., ,     0.,   10.2
  2.28, 26320.,  1283., ,     0.,  13.16
  2.79, 32240.,  1283., ,     0.,  16.12
   3.3, 38160.,  1283., ,     0.,  19.08
  3.82, 44080.,  1283., ,     0.,  22.04
  4.33, 50000.,  1283., ,     0.,    25.
  4.84, 55920.,  1283., ,     0.,  27.96
  5.36, 61840.,  1283., ,     0.,  30.92
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 16.12,186160.,  1283., ,     0.,  93.08
*User Defined Field
**
** INTERACTION PROPERTIES
**
*Surface Interaction, name=NT_EXPO
1.,
*Friction, slip tolerance=0.001, taumax=5.
 0.5,
*Surface Behavior, pressure-overclosure=EXPONENTIAL
0.0001, 10.
**
** BOUNDARY CONDITIONS
**
** Name: Disp-BC-1 Type: Displacement/Rotation
*Boundary
SOIL-1.S_BOTNODES, 1, 1
** Name: Disp-BC-2 Type: Displacement/Rotation
*Boundary
SOIL-1.S_BOTNODES, 2, 2
**
** INTERACTIONS
**
** Interaction: NT_EXPO-1
*Contact Pair, interaction=NT_EXPO, small sliding, adjust=0.001
SOIL-1_S-F_CNS__CNS__CNS_, FOOTING-1.SURF-F-S
** ----------------------------------------------------------------
**
** STEP: Gravity
**
*Step, name=Gravity, nlgeom=NO, inc=100000
Gravity
*Static
0.01, 1., 1e-05, 0.01
**
** LOADS
**
** Name: GRAVITY-1   Type: Gravity
*Dload
, GRAV, 9.81, 0., -1.
**
** OUTPUT REQUESTS
**
*Restart, write, frequency=0
**
** FIELD OUTPUT: F-Output-1
**
*Output, field, variable=PRESELECT
**
** HISTORY OUTPUT: H-Output-1
**
*Output, history, variable=PRESELECT
*End Step
** ----------------------------------------------------------------
**
** STEP: Self_weight
**
*Step, name=Self_weight, nlgeom=NO, inc=100000
Footing_self_weight
*Static
0.01, 1., 1e-05, 0.01
**
** LOADS
**
** Name: CFORCE-1   Type: Concentrated force
*Cload
FOOTING-1.SET-7, 2, -50.
**
** OUTPUT REQUESTS
**
*Restart, write, frequency=0
**
** FIELD OUTPUT: F-Output-2
**
*Output, field, variable=PRESELECT
**
** HISTORY OUTPUT: H-Output-2
**
*Output, history, variable=PRESELECT
*End Step
** ----------------------------------------------------------------
**
** STEP: Dynamic
**
*Step, name=Dynamic, nlgeom=NO, inc=100000000
Apply_equiv_forces
*Dynamic,alpha=0.
0.001,10.,0.001
**
** BOUNDARY CONDITIONS
**
** Name: Acc Type: Acceleration/Angular acceleration
*Boundary, op=NEW, amplitude=EQ, type=ACCELERATION
SOIL-1.S_BOTNODES, 1, 1, 9.81
** Name: Disp-BC-1 Type: Displacement/Rotation
*Boundary, op=NEW
** Name: Disp-BC-2 Type: Displacement/Rotation
*Boundary, op=NEW
SOIL-1.S_BOTNODES, 2, 2
**
** OUTPUT REQUESTS
**
*Restart, write, frequency=0
**
** FIELD OUTPUT: F-Output-3
**
*Output, field, variable=PRESELECT, frequency=1
**
** HISTORY OUTPUT: H-Output-3
**
*Output, history, variable=PRESELECT, frequency=1
*End Step
