*Heading
** Job name: Incorp Model name: EmbeddedFND
** Generated by: Abaqus/CAE 6.14-1
*Preprint, echo=NO, model=NO, history=NO, contact=NO
**
** PARTS
**
*Part, name=FND
*Node
      1,          -8.,          -2.
      2,         -8.5,          -2.
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*Element, type=CPE4R
 1,  1, 22, 48, 47
 2,  2, 24, 50, 49
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*Nset, nset=FND-REFPT_, internal
 46,
*Nset, nset=CORNERS
 15, 21
*Nset, nset=MD
 11,
*Elset, elset=_BOT_F_S3, internal
  7,  8,  9, 10, 11, 12
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*Nset, nset=BOT_NODES
 15, 16, 17, 18, 19, 20, 21, 35, 37, 39, 41, 43, 45
*Nset, nset=WHOLE_FND
  1,  2,  3,  4,  5,  6
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*Elset, elset=WHOLE_FND, generate
  1,  48,   1
*Elset, elset=_BOT_F_S3_1, internal
 31, 32, 33, 34, 35, 36, 43, 44, 45, 46, 47, 48
*Surface, type=ELEMENT, name=BOT_F
_BOT_F_S3_1, S3
*Elset, elset=_Fperim_S2, internal
 18, 24, 42, 48
*Elset, elset=_Fperim_S3, internal
 31, 32, 33, 34, 35, 36, 43, 44, 45, 46, 47, 48
*Elset, elset=_Fperim_S4, internal
  1,  7, 25, 31
*Surface, type=ELEMENT, name=Fperim
_Fperim_S2, S2
_Fperim_S3, S3
_Fperim_S4, S4
** Section: Section-1-WHOLE_FND
*Solid Section, elset=WHOLE_FND, material=FOUNDATION
,
*End Part
**
*Part, name=MASS
*Node
      1,           0.,           1.
*Nset, nset=MASS-REFPT_, internal
 1,
*Nset, nset=MASS
 1,
*Nset, nset=_PickedSet5, internal
 1,
*Element, type=MASS, elset=_PickedSet5_MASS_INERTIA-1__
1, 1
*Mass, elset=_PickedSet5_MASS_INERTIA-1__
2.7e+08,
*End Part
**
*Part, name=PIER
*Node
      1,           0.,         -1.5
      2,           0.,         -5.5
      3,           0.,         -3.5
*Element, type=B21
1, 1, 2
*Nset, nset=PIER-REFPT_, internal
 3,
*Nset, nset=PIER
 1, 2
*Elset, elset=PIER
 1,
** Section: Section-2-PIER  Profile: Profile-1
*Beam Section, elset=PIER, material=PIER, poisson = 0.33, temperature=GRADIENTS, section=RECT
1., 0.1
0.,0.,-1.
*End Part
**
*Part, name=Soil
*Node
      1,   9.69999981,          13.
      2,   9.69999981,          11.
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*Element, type=CPE4R
 1,   1,  27, 374,  54
 2,  27,  28, 375, 374
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*Element, type=CPS4R
635,  16, 206, 876, 232
636, 206, 207, 877, 876
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*Nset, nset=Set-1
   1,   2,   3,   4,   5,   6
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*Elset, elset=Set-1, generate
   1,  634,    1
*Nset, nset=Set-26, generate
    1,  1562,     1
*Elset, elset=Set-26, generate
    1,  1471,     1
*Nset, nset=Bottom
   7,   8,  12,  15,  19,  24
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*Nset, nset=left
  22,  23,  26, 276, 277, 278
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*Nset, nset=right
   3,   4,   8,  41,  42,  43
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*Nset, nset=nodes_perm
  10,  11,  13,  18, 131, 132
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*Elset, elset=_SoilUndr_perim_S4, internal
 289, 297, 305, 313, 321, 455
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*Elset, elset=_SoilUndr_perim_S3, internal, generate
 698,  703,    1
*Surface, type=ELEMENT, name=SoilUndr_perim
_SoilUndr_perim_S4, S4
_SoilUndr_perim_S3, S3
** Section: Section-3-SOIL_WHOLE
*Solid Section, elset=Set-26, material=SOIL
,
*End Part
**
**
** ASSEMBLY
**
*Assembly, name=Assembly
**
*Instance, name=FND-1, part=FND
        27.5,          29.,           0.
*End Instance
**
*Instance, name=PIER-1, part=PIER
         18.,         32.5,           0.
*End Instance
**
*Instance, name=MASS-1, part=MASS
         18.,          30.,           0.
*End Instance
**
*Instance, name=Soil-1, part=Soil
        15.5,          14.,           0.
*End Instance
**
*Node
      1,          18.,          27.
*MPC
BEAM, Soil-1.8, Soil-1.26
BEAM, Soil-1.3, Soil-1.23
*Nset, nset=M_SET-9, instance=FND-1
  1,  2,  3,  4,  5,  6,  7, 22, 24, 26, 28, 30, 32, 46
*Nset, nset=M_TOPFND, instance=FND-1
  1,  2,  3,  4,  5,  6,  7, 22, 24, 26, 28, 30, 32, 46
*Nset, nset=M_TOPFND, instance=PIER-1
 2,
*Nset, nset=RP_F
 1,
*Nset, nset=S_SET-10, instance=PIER-1
 1, 2
*Nset, nset=S_SET-11, instance=PIER-1
 3,
*Nset, nset=Wire-1-Set-1, instance=Soil-1
  3,  8, 23, 26
*Nset, nset=RP_F_CNS_, internal
 1,
*Elset, elset=_M_SURF-1_S1, internal, instance=FND-1, generate
 1,  6,  1
*Elset, elset=_M_SURF-1_S1_1, internal, instance=FND-1
  1,  2,  3,  4,  5,  6, 13, 14, 15, 16, 17, 18
*Elset, elset=_M_SURF-1_S1_2, internal, instance=FND-1
  1,  2,  3,  4,  5,  6, 13, 14, 15, 16, 17, 18
*Elset, elset=_M_SURF-FNDTOP_S1, internal, instance=FND-1
  1,  2,  3,  4,  5,  6, 13, 14, 15, 16, 17, 18
*Nset, nset=_PICKEDSET62, internal
 1,
*Nset, nset=_PickedSet30, internal
 1,
*Elset, elset=_S_PIER_SNEG, internal, instance=PIER-1
 1,
*Elset, elset=_S_SURF-3_SNEG, internal, instance=PIER-1
 1,
*Surface, type=ELEMENT, name=M_SURF-FNDTOP
_M_SURF-FNDTOP_S1, S1
*Surface, type=ELEMENT, name=S_PIER
_S_PIER_SNEG, SNEG
*Surface, type=ELEMENT, name=S_SURF-3
_S_SURF-3_SNEG, SNEG
*Surface, type=NODE, name=Soil-1_nodes_perm_CNS_, internal
Soil-1.nodes_perm, 1.
*Surface, type=NODE, name=RP_F_CNS__CNS_, internal
RP_F_CNS_, 1.
** Constraint: F-P-1
*Tie, name=F-P-1, adjust=yes, position tolerance=0.5, type=NODE TO SURFACE
S_PIER, RP_F_CNS__CNS_
** Constraint: M-F
*Coupling, constraint name=M-F, ref node=MASS-1.MASS, surface=M_SURF-FNDTOP
*Distributing, weighting method=UNIFORM
** Constraint: RigidBody-1
*Rigid Body, ref node=_PickedSet30, elset=FND-1.WHOLE_FND, position=CENTER OF MASS
*End Assembly
*Amplitude, name=Cyclic_man
             0.,              0.,            0.05,     2.506664671,             0.1,     4.973797743,            0.15,     7.362491054
            0.2,     9.635073482,            0.25,     11.75570505,             0.3,     13.69094212,            0.35,     15.41026486
            0.4,     16.88655851,            0.45,     18.09654105,             0.5,     19.02113033,            0.55,     19.64574501
            0.6,     19.96053457,            0.65,     19.96053457,             0.7,     19.64574501,            0.75,     19.02113033
            0.8,     18.09654105,            0.85,     16.88655851,             0.9,     15.41026486,            0.95,     13.69094212
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            10.,    -1.96024e-14
*Amplitude, name=EQ
             0.,          0.0124,           0.005,          0.0092,            0.01,          0.0056,           0.015,         -0.0004
           0.02,         -0.0032,           0.025,         -0.0004,            0.03,          0.0048,           0.035,          0.0112
           0.04,           0.016,           0.045,          0.0168,            0.05,           0.014,           0.055,            0.01
           0.06,          0.0056,           0.065,           0.002,            0.07,          0.0004,           0.075,          0.0008
           0.08,          0.0036,           0.085,          0.0068,            0.09,          0.0104,           0.095,           0.012
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             5.,         -0.0176
*Amplitude, name=Ramp
             0.,              0.,             0.1,             0.1,             0.2,             0.2,             0.3,             0.3
            0.5,             0.5,             0.6,             0.6,             0.8,             0.8,             0.9,             0.9
             1.,              1.
*Amplitude, name=cyclic, definition=PERIODIC
1,            6.28,              0.,              0.
             1.,              0.
*Amplitude, name=leftRight
             0.,              0.,            0.25,            0.25,             0.5,             0.5,            0.75,            0.75
             1.,              1.,            1.25,            0.75,             1.5,             0.5,            1.75,            0.25
             2.,              0.,            2.25,           -0.25,             2.5,            -0.5,            2.75,           -0.75
             3.,             -1.,            3.25,           -0.75,             3.5,            -0.5,            3.75,           -0.25
             4.,              0.
**
** MATERIALS
**
*Material, name=FOUNDATION
*Density
 2.1,
*Elastic
 2e+06, 0.3
*Plastic
2200.,0.
*Material, name=MASS
*Density
3.,
*Material, name=PIER
*Density
3.,
*Elastic
 2e+10, 0.33
*Material, name=SOIL
*Damping, beta=0.0017
*Density
 1.8,
*Depvar
      2,
*Elastic, dependencies=2
  8560.,   0.48, ,     0.,     0.
  8560.,   0.48, ,     0.,  8560.
 14480.,   0.48, ,     0., 14480.
 20400.,   0.48, ,     0., 20400.
 26320.,   0.48, ,     0., 26320.
 32240.,   0.48, ,     0., 32240.
 38160.,   0.48, ,     0., 38160.
 44080.,   0.48, ,     0., 44080.
 50000.,   0.48, ,     0., 50000.
 55920.,   0.48, ,     0., 55920.
 61840.,   0.48, ,     0., 61840.
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186160.,   0.48, ,     0.,186160.
*Plastic, dependencies=2, hardening=COMBINED, datatype=PARAMETERS, number backstresses=1
  0.74,  8560.,  1283., ,     0.,     0.
  0.74,  8560.,  1283., ,     0.,   4.28
  1.25, 14480.,  1283., ,     0.,   7.24
  1.77, 20400.,  1283., ,     0.,   10.2
  2.28, 26320.,  1283., ,     0.,  13.16
  2.79, 32240.,  1283., ,     0.,  16.12
   3.3, 38160.,  1283., ,     0.,  19.08
  3.82, 44080.,  1283., ,     0.,  22.04
  4.33, 50000.,  1283., ,     0.,    25.
  4.84, 55920.,  1283., ,     0.,  27.96
  5.36, 61840.,  1283., ,     0.,  30.92
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 16.12,186160.,  1283., ,     0.,  93.08
*User Defined Field
**
** INTERACTION PROPERTIES
**
*Surface Interaction, name=Cohesive
1.,
*Cohesive Behavior
0., 5e+07, 5e+07
*Surface Interaction, name=NormalTangent
1.,
*Friction, lagrange, taumax=10.
 0.9,
*Surface Behavior, pressure-overclosure=EXPONENTIAL
1e-05, 0.1
**
** INTERACTIONS
**
** Interaction: Cohesive
*Contact Pair, interaction=Cohesive, small sliding
Soil-1_nodes_perm_CNS_, FND-1.Fperim
** ----------------------------------------------------------------
**
** STEP: apply force
**
*Step, name="apply force", nlgeom=NO, inc=1000000
Force
*Dynamic
0.05,5.,5e-09
**
** BOUNDARY CONDITIONS
**
** Name: Bottom Type: Displacement/Rotation
*Boundary
Soil-1.Bottom, 1, 1
Soil-1.Bottom, 2, 2
Soil-1.Bottom, 6, 6
**
** LOADS
**
** Name: Load-2   Type: Concentrated force
*Cload, amplitude=leftRight
MASS-1.MASS, 1, 500.
MASS-1.MASS, 2, -100.
**
** OUTPUT REQUESTS
**
*Restart, write, frequency=0
**
** FIELD OUTPUT: F-Output-1
**
*Output, field, time interval=1.
*Node Output
CF, RF, U, UR, UT
*Element Output, directions=YES
E, EE, PEEQ, PEEQMAX, PEMAG, S
*Contact Output
CDISP, CDSTRESS, CSTRESS
**
** HISTORY OUTPUT: H-Output-1
**
*Output, history, number interval=1
*Element Output
IRF1, IRF2, IRF3, IRM1, IRM2, IRM3
*Contact Output
CAREA, CDISP, CFS1, CFS2, CFS3, CFSM, CSTRESS
*End Step
