*Heading
** Job name: Inf_withNEWmesh Model name: NewMesh_inf
** Generated by: Abaqus/CAE 6.14-1
*Preprint, echo=NO, model=NO, history=NO, contact=NO
**
** PARTS
**
*Part, name=FND
*Node
      1,          -8.,          -2.
      2,         -8.5,          -2.
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*Element, type=CPE4R
 1,  1, 22, 23,  8
 2,  2, 24, 25,  9
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*Nset, nset=FND-REFPT_, internal
 46,
*Nset, nset=CORNERS
 15, 21
*Nset, nset=MD
 11,
*Elset, elset=_BOT_F_S3, internal
  7,  8,  9, 10, 11, 12, 19, 20, 21, 22, 23, 24
*Nset, nset=BOT_NODES
 15, 16, 17, 18, 19, 20, 21, 35, 37, 39, 41, 43, 45
*Nset, nset=WHOLE_FND
  1,  2,  3,  4,  5,  6
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*Elset, elset=WHOLE_FND, generate
  1,  24,   1
*Surface, type=ELEMENT, name=BOT_F
_BOT_F_S3, S3
** Section: Section-1-WHOLE_FND
*Solid Section, elset=WHOLE_FND, material=FOUNDATION
,
*End Part
**
*Part, name=MASS
*Node
      1,           0.,           1.
      2,           0.,           1.
*Nset, nset=MASS-REFPT_, internal
 1, 2
*Nset, nset=MASS
 1,
*Nset, nset=_PICKEDSET5, internal
 1,
*Nset, nset=_PICKEDSET6, internal
 1,
*Nset, nset=_PickedSet8, internal
 1,
*Element, type=MASS, elset=_PickedSet8_MASS_MASS__
1, 1
*Mass, elset=_PickedSet8_MASS_MASS__
1e+08,
*End Part
**
*Part, name=PIER
*Node
      1,           0.,         -1.5
      2,           0.,         -5.5
      3,           0.,         -3.5
*Element, type=B21
1, 1, 2
*Nset, nset=PIER-REFPT_, internal
 3,
*Nset, nset=PIER
 1, 2
*Elset, elset=PIER
 1,
** Section: Section-2-PIER  Profile: Profile-1
*Beam Section, elset=PIER, material=PIER, poisson = 0.33, temperature=GRADIENTS, section=RECT
1., 1.
0.,0.,-1.
*End Part
**
*Part, name=SOIL
*Node
      1,          60.,          18.
      2,          60.,           0.
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*Element, type=CINPE4
 1,  1, 25, 58,  4
 2, 25, 26, 57, 58
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*Element, type=CPE4R
  23,    7,   65,  350,  107
  24,   65,   66,  351,  350
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*Nset, nset=SET-17, generate
    1,  1449,     1
*Elset, elset=SET-17, generate
    1,  1364,     1
*Nset, nset=SOIL_F
  12,  15, 213, 214, 215, 216, 217, 218, 219, 220, 221, 222, 223
*Nset, nset=SOIL_ACC
   2,   8,  11,  14,  17,  20
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*Elset, elset=_SOIL_F_S4, internal, generate
 767,  811,    4
*Surface, type=ELEMENT, name=SOIL_F
_SOIL_F_S4, S4
** Section: Section-3-SET-17
*Solid Section, elset=SET-17, material=SOIL
,
*End Part
**
**
** ASSEMBLY
**
*Assembly, name=Assembly
**
*Instance, name=FND-1, part=FND
        27.5,          29.,           0.
*End Instance
**
*Instance, name=PIER-1, part=PIER
         18.,         32.5,           0.
*End Instance
**
*Instance, name=MASS-1, part=MASS
         18.,          30.,           0.
*End Instance
**
*Instance, name=SOIL-1, part=SOIL
        -22.,           6.,           0.
*End Instance
**
*Node
      1,          18.,          27.
*MPC
BEAM, SOIL-1.3, SOIL-1.22
BEAM, SOIL-1.42, SOIL-1.330
BEAM, SOIL-1.43, SOIL-1.329
BEAM, SOIL-1.44, SOIL-1.328
BEAM, SOIL-1.45, SOIL-1.327
BEAM, SOIL-1.46, SOIL-1.326
BEAM, SOIL-1.47, SOIL-1.325
BEAM, SOIL-1.48, SOIL-1.324
BEAM, SOIL-1.49, SOIL-1.323
BEAM, SOIL-1.50, SOIL-1.322
BEAM, SOIL-1.51, SOIL-1.321
BEAM, SOIL-1.52, SOIL-1.320
BEAM, SOIL-1.53, SOIL-1.319
BEAM, SOIL-1.54, SOIL-1.318
BEAM, SOIL-1.55, SOIL-1.317
BEAM, SOIL-1.56, SOIL-1.316
BEAM, SOIL-1.57, SOIL-1.315
BEAM, SOIL-1.58, SOIL-1.314
BEAM, SOIL-1.4, SOIL-1.21
BEAM, SOIL-1.62, SOIL-1.349
BEAM, SOIL-1.63, SOIL-1.348
BEAM, SOIL-1.64, SOIL-1.347
BEAM, SOIL-1.6, SOIL-1.24
*Nset, nset=M_TOPFND, instance=FND-1
  1,  2,  3,  4,  5,  6,  7, 22, 24, 26, 28, 30, 32, 46
*Nset, nset=M_TOPFND, instance=PIER-1
 2,
*Nset, nset=RP_F
 1,
*Nset, nset=S_SET-10, instance=PIER-1
 1, 2
*Nset, nset=S_SET-11, instance=PIER-1
 3,
*Nset, nset=Wire-1-Set-1, instance=SOIL-1
   3,   4,   6,  21,  22,  24
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*Nset, nset=RP_F_CNS_, internal
 1,
*Nset, nset=RP_F_CNS__CNS_, internal
 1,
*Nset, nset=RP_F_CNS__CNS__CNS_, internal
 1,
*Elset, elset=_M_SURF-1_S1, internal, instance=FND-1, generate
 1,  6,  1
*Elset, elset=_M_SURF-1_S1_1, internal, instance=FND-1
  1,  2,  3,  4,  5,  6, 13, 14, 15, 16, 17, 18
*Elset, elset=_M_SURF-1_S1_2, internal, instance=FND-1
  1,  2,  3,  4,  5,  6, 13, 14, 15, 16, 17, 18
*Elset, elset=_M_SURF-FNDTOP_S1, internal, instance=FND-1
  1,  2,  3,  4,  5,  6, 13, 14, 15, 16, 17, 18
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*Nset, nset=_PickedSet35, internal
 1,
*Elset, elset=_S_PIER_SNEG, internal, instance=PIER-1
 1,
*Elset, elset=_S_SURF-3_SNEG, internal, instance=PIER-1
 1,
*Surface, type=ELEMENT, name=M_SURF-FNDTOP
_M_SURF-FNDTOP_S1, S1
*Surface, type=ELEMENT, name=S_PIER
_S_PIER_SNEG, SNEG
*Surface, type=NODE, name=SOIL-1_SOIL_F_CNS_, internal
SOIL-1.SOIL_F, 1.
*Surface, type=NODE, name=RP_F_CNS_, internal
RP_F, 1.
** Constraint: F-P-1-1-1-1
*Tie, name=F-P-1-1-1-1, adjust=yes, position tolerance=10., no rotation, type=NODE TO SURFACE
S_PIER, RP_F_CNS_
** Constraint: M-F
*Coupling, constraint name=M-F, ref node=MASS-1.MASS, surface=M_SURF-FNDTOP
*Distributing, weighting method=UNIFORM, coupling=STRUCTURAL
** Constraint: RigidBody-1
*Rigid Body, ref node=_PickedSet35, elset=FND-1.WHOLE_FND, position=CENTER OF MASS
*End Assembly
*Amplitude, name=EQ
             0.,          0.0072,           0.005,          0.0062,            0.01,          0.0046,           0.015,          0.0028
           0.02,         -0.0002,           0.025,         -0.0016,            0.03,         -0.0002,           0.035,          0.0024
           0.04,          0.0056,           0.045,           0.008,            0.05,          0.0084,           0.055,           0.007
           0.06,           0.005,           0.065,          0.0028,            0.07,           0.001,           0.075,          0.0002
           0.08,          0.0004,           0.085,          0.0018,            0.09,          0.0034,           0.095,          0.0052
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            10.,          0.0176
**
** MATERIALS
**
*Material, name=FOUNDATION
*Density
 2.1,
*Elastic
 2e+06, 0.3
*Plastic
2200.,0.
*Material, name=MASS
*Density
3.,
*Material, name=PIER
*Density
 0.1,
*Elastic
 2e+10, 0.33
*Material, name=SOIL
*Damping, beta=0.0017
*Density
 1.8,
*Depvar
      2,
*Elastic, dependencies=2
  8560.,   0.48, ,     0.,     0.
  8560.,   0.48, ,     0.,  8560.
 14480.,   0.48, ,     0., 14480.
 20400.,   0.48, ,     0., 20400.
 26320.,   0.48, ,     0., 26320.
 32240.,   0.48, ,     0., 32240.
 38160.,   0.48, ,     0., 38160.
 44080.,   0.48, ,     0., 44080.
 50000.,   0.48, ,     0., 50000.
 55920.,   0.48, ,     0., 55920.
 61840.,   0.48, ,     0., 61840.
 67760.,   0.48, ,     0., 67760.
 73680.,   0.48, ,     0., 73680.
 79600.,   0.48, ,     0., 79600.
 85520.,   0.48, ,     0., 85520.
 91440.,   0.48, ,     0., 91440.
 97360.,   0.48, ,     0., 97360.
103280.,   0.48, ,     0.,103280.
109200.,   0.48, ,     0.,109200.
115120.,   0.48, ,     0.,115120.
121040.,   0.48, ,     0.,121040.
126960.,   0.48, ,     0.,126960.
*Plastic, dependencies=2, hardening=COMBINED, datatype=PARAMETERS, number backstresses=1
  0.74,  8560.,  1283., ,     0.,     0.
  0.74,  8560.,  1283., ,     0.,   4.28
  1.25, 14480.,  1283., ,     0.,   7.24
  1.77, 20400.,  1283., ,     0.,   10.2
  2.28, 26320.,  1283., ,     0.,  13.16
  2.79, 32240.,  1283., ,     0.,  16.12
   3.3, 38160.,  1283., ,     0.,  19.08
  3.82, 44080.,  1283., ,     0.,  22.04
  4.33, 50000.,  1283., ,     0.,    25.
  4.84, 55920.,  1283., ,     0.,  27.96
  5.36, 61840.,  1283., ,     0.,  30.92
  5.87, 67760.,  1283., ,     0.,  33.88
  6.38, 73680.,  1283., ,     0.,  36.84
  6.89, 79600.,  1283., ,     0.,   39.8
  7.41, 85520.,  1283., ,     0.,  42.76
  7.92, 91440.,  1283., ,     0.,  45.72
  8.43, 97360.,  1283., ,     0.,  48.68
  8.94,103280.,  1283., ,     0.,  51.64
  9.46,109200.,  1283., ,     0.,   54.6
  9.97,115120.,  1283., ,     0.,  57.56
 10.48,121040.,  1283., ,     0.,  60.52
   11.,126960.,  1283., ,     0.,  63.48
*User Defined Field
**
** INTERACTION PROPERTIES
**
*Surface Interaction, name=COHESIVE
1.,
*Cohesive Behavior
0., 1e+08, 1e+08
*Surface Interaction, name=NT_expo
1.,
*Friction, slip tolerance=0.001, taumax=5.
 0.9,
*Surface Behavior, pressure-overclosure=EXPONENTIAL
1e-06, 10.
**
** INTERACTIONS
**
** Interaction: COHESIVE-1
*Contact Pair, interaction=COHESIVE, small sliding, adjust=0.001
SOIL-1_SOIL_F_CNS_, FND-1.BOT_F
** ----------------------------------------------------------------
**
** STEP: Step-1
**
*Step, name=Step-1, nlgeom=NO, inc=1000000
Gravity
*Static
0.01, 1., 1e-09, 0.01
**
** BOUNDARY CONDITIONS
**
** Name: Disp-BC-3 Type: Displacement/Rotation
*Boundary
SOIL-1.SOIL_ACC, 2, 2
** Name: Disp-BC-4 Type: Displacement/Rotation
*Boundary
SOIL-1.SOIL_ACC, 2, 2
** Name: Disp-BC-5 Type: Displacement/Rotation
*Boundary
SOIL-1.SOIL_ACC, 6, 6
** Name: Mass Type: Displacement/Rotation
*Boundary
MASS-1.MASS, 2, 2
** Name: RB_disp Type: Displacement/Rotation
*Boundary
RP_F, 1, 1
**
** LOADS
**
** Name: CFORCE-1   Type: Concentrated force
*Cload
MASS-1.MASS, 1, 50.
MASS-1.MASS, 2, 0.
**
** OUTPUT REQUESTS
**
*Restart, write, frequency=0
**
** FIELD OUTPUT: F-Output-1
**
*Output, field, variable=PRESELECT
**
** HISTORY OUTPUT: H-Output-1
**
*Output, history
*Contact Output
CDISP, CFS1, CFS2, CFS3, CFSM, CSTRESS
*End Step
** ----------------------------------------------------------------
**
** STEP: Step-2
**
*Step, name=Step-2, nlgeom=NO, inc=1000000
*Dynamic,alpha=0.
0.005,10.,0.005
**
** BOUNDARY CONDITIONS
**
** Name: Acc-BC-1 Type: Acceleration/Angular acceleration
*Boundary, op=NEW, amplitude=EQ, type=ACCELERATION
SOIL-1.SOIL_ACC, 1, 1, 1.
** Name: Disp-BC-3 Type: Displacement/Rotation
*Boundary, op=NEW
** Name: Disp-BC-4 Type: Displacement/Rotation
*Boundary, op=NEW
** Name: Disp-BC-5 Type: Displacement/Rotation
*Boundary, op=NEW
** Name: Disp-BC-8 Type: Displacement/Rotation
*Boundary, op=NEW
SOIL-1.SOIL_ACC, 2, 2
** Name: Disp-BC-9 Type: Displacement/Rotation
*Boundary, op=NEW
SOIL-1.SOIL_ACC, 2, 2
** Name: Mass Type: Displacement/Rotation
*Boundary, op=NEW
MASS-1.MASS, 2, 2
** Name: RB_disp Type: Displacement/Rotation
*Boundary, op=NEW
RP_F, 1, 1
**
** LOADS
**
** Name: CFORCE-1   Type: Concentrated force
*Cload, op=NEW
**
** OUTPUT REQUESTS
**
*Restart, write, frequency=0
**
** FIELD OUTPUT: F-Output-2
**
*Output, field, variable=PRESELECT, frequency=1
**
** HISTORY OUTPUT: H-Output-2
**
*Output, history, frequency=1
*Contact Output
CDISP, CFN1, CFN2, CFN3, CFNM, CSTRESS
*End Step
