*Heading
** Job name: Model_v6_forces Model name: Equiv
** Generated by: Abaqus/CAE 6.14-1
*Preprint, echo=NO, model=NO, history=NO, contact=NO
**
** PARTS
**
*Part, name=FOOTING
*Node
      1,          7.5,          9.5
      2,         7.25,          9.5
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*Element, type=CPE4R
 1,  1,  2, 19, 18
 2,  2,  3, 20, 19
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*Nset, nset=FOOTING-REFPT_, internal
 35,
*Nset, nset=FOOTING, generate
  1,  34,   1
*Elset, elset=FOOTING, generate
  1,  16,   1
*Nset, nset=SET-9
 35,
*Nset, nset=S_F_NODES, generate
 18,  34,   1
*Elset, elset=_SURF-FOOTINGBOT_S3, internal, generate
  1,  16,   1
*Elset, elset=_SURF-FOOTINGTOP_S1, internal, generate
  1,  16,   1
*Nset, nset=_PICKEDSET12, internal
 35,
*Nset, nset=_PICKEDSET13, internal
 35,
*Nset, nset=_PickedSet14, internal
 35,
*Surface, type=ELEMENT, name=SURF-FOOTINGBOT
_SURF-FOOTINGBOT_S3, S3
*Surface, type=ELEMENT, name=SURF-FOOTINGTOP
_SURF-FOOTINGTOP_S1, S1
** Section: Section-1-FOOTING
*Solid Section, elset=FOOTING, material=FOOTING
,
*Element, type=MASS, elset=_PickedSet14__PICKEDSET13__PICKEDSET12_SET-9_INERTIA-1____
17, 35
*Mass, elset=_PickedSet14__PICKEDSET13__PICKEDSET12_SET-9_INERTIA-1____
10000.,
*End Part
**
*Part, name=PIER
*Node
      1,          30.,         12.5
      2,          30.,         27.5
      3,          30.,         27.5
*Element, type=B21
1, 1, 2
*Nset, nset=PIER-REFPT_, internal
 3,
*Nset, nset=SET-1
 1, 2
*Elset, elset=SET-1
 1,
*Nset, nset=SET-2
 3,
*Nset, nset=_PickedSet7, internal
 3,
** Section: Section-2-SET-1  Profile: Profile-1
*Beam Section, elset=SET-1, material=PIER, poisson = 0.3, temperature=GRADIENTS, section=CIRC
3.
0.,0.,-1.
*Element, type=MASS, elset=_PickedSet7_SET-2_INERTIA-1__
2, 3
*Mass, elset=_PickedSet7_SET-2_INERTIA-1__
10000.,
*End Part
**
*Part, name=SOIL
*Node
      1,           7.,         10.5
      2,           7.,         40.5
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*Element, type=CPE4R
   1,    1,   17,  675,  152
   2,   17,   18,  676,  675
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*Nset, nset=SET-1, generate
    1,  6161,     1
*Elset, elset=SET-1, generate
    1,  6000,     1
*Nset, nset=SOIL_BOTNODES
   1,   4,   5,   7,   9,  12
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*Nset, nset=SOIL_RIGHTNODES
  13,  14, 512, 513, 514, 515
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*Nset, nset=SOIL_LEFTNODES
   3,   4,  85,  86,  87,  88
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*Nset, nset=S-F_NODES, generate
 416,  432,    1
*Elset, elset=_SURF-S-F_S4, internal, generate
 2521,  3421,    60
*Surface, type=ELEMENT, name=SURF-S-F
_SURF-S-F_S4, S4
** Section: Section-3-SET-1
*Solid Section, elset=SET-1, material=SOIL
,
*End Part
**
**
** ASSEMBLY
**
*Assembly, name=Assembly
**
*Instance, name=FOOTING-1, part=FOOTING
        48.5,         31.5,           0.
*End Instance
**
*Instance, name=SOIL-1, part=SOIL
         32.,           0.,           0.
*End Instance
**
*Instance, name=PIER-1, part=PIER
         24.,         28.5,           0.
*End Instance
**
*MPC
BEAM, SOIL-1.512, SOIL-1.143
BEAM, SOIL-1.513, SOIL-1.142
BEAM, SOIL-1.514, SOIL-1.141
BEAM, SOIL-1.515, SOIL-1.140
BEAM, SOIL-1.516, SOIL-1.139
BEAM, SOIL-1.517, SOIL-1.138
BEAM, SOIL-1.518, SOIL-1.137
BEAM, SOIL-1.519, SOIL-1.136
BEAM, SOIL-1.520, SOIL-1.135
BEAM, SOIL-1.521, SOIL-1.134
BEAM, SOIL-1.522, SOIL-1.133
BEAM, SOIL-1.523, SOIL-1.132
BEAM, SOIL-1.524, SOIL-1.131
BEAM, SOIL-1.525, SOIL-1.130
BEAM, SOIL-1.526, SOIL-1.129
BEAM, SOIL-1.527, SOIL-1.128
BEAM, SOIL-1.528, SOIL-1.127
BEAM, SOIL-1.529, SOIL-1.126
BEAM, SOIL-1.530, SOIL-1.125
BEAM, SOIL-1.531, SOIL-1.124
BEAM, SOIL-1.532, SOIL-1.123
BEAM, SOIL-1.533, SOIL-1.122
BEAM, SOIL-1.534, SOIL-1.121
BEAM, SOIL-1.535, SOIL-1.120
BEAM, SOIL-1.536, SOIL-1.119
BEAM, SOIL-1.537, SOIL-1.118
BEAM, SOIL-1.538, SOIL-1.117
BEAM, SOIL-1.539, SOIL-1.116
BEAM, SOIL-1.540, SOIL-1.115
BEAM, SOIL-1.541, SOIL-1.114
BEAM, SOIL-1.542, SOIL-1.113
BEAM, SOIL-1.543, SOIL-1.112
BEAM, SOIL-1.544, SOIL-1.111
BEAM, SOIL-1.545, SOIL-1.110
BEAM, SOIL-1.546, SOIL-1.109
BEAM, SOIL-1.547, SOIL-1.108
BEAM, SOIL-1.548, SOIL-1.107
BEAM, SOIL-1.549, SOIL-1.106
BEAM, SOIL-1.550, SOIL-1.105
BEAM, SOIL-1.551, SOIL-1.104
BEAM, SOIL-1.552, SOIL-1.103
BEAM, SOIL-1.553, SOIL-1.102
BEAM, SOIL-1.554, SOIL-1.101
BEAM, SOIL-1.555, SOIL-1.100
BEAM, SOIL-1.556, SOIL-1.99
BEAM, SOIL-1.557, SOIL-1.98
BEAM, SOIL-1.558, SOIL-1.97
BEAM, SOIL-1.559, SOIL-1.96
BEAM, SOIL-1.560, SOIL-1.95
BEAM, SOIL-1.561, SOIL-1.94
BEAM, SOIL-1.562, SOIL-1.93
BEAM, SOIL-1.563, SOIL-1.92
BEAM, SOIL-1.564, SOIL-1.91
BEAM, SOIL-1.565, SOIL-1.90
BEAM, SOIL-1.566, SOIL-1.89
BEAM, SOIL-1.567, SOIL-1.88
BEAM, SOIL-1.568, SOIL-1.87
BEAM, SOIL-1.569, SOIL-1.86
BEAM, SOIL-1.570, SOIL-1.85
BEAM, SOIL-1.14, SOIL-1.3
*Nset, nset=M_SET-2, instance=FOOTING-1
 35,
*Nset, nset=SET-5, instance=FOOTING-1
 35,
*Nset, nset=SET-10, instance=SOIL-1
 3,
*Nset, nset=SET-11, instance=SOIL-1
 85,
*Nset, nset=SET-12, instance=SOIL-1
 86,
*Nset, nset=SET-13, instance=SOIL-1
 87,
*Nset, nset=SET-14, instance=SOIL-1
 89,
*Nset, nset=SET-15, instance=SOIL-1
 90,
*Nset, nset=SET-16, instance=SOIL-1
 91,
*Nset, nset=SET-17, instance=SOIL-1
 92,
*Nset, nset=SET-18, instance=SOIL-1
 93,
*Nset, nset=SET-19, instance=SOIL-1
 94,
*Nset, nset=SET-20, instance=SOIL-1
 95,
*Nset, nset=SET-21, instance=SOIL-1
 96,
*Nset, nset=SET-22, instance=SOIL-1
 97,
*Nset, nset=SET-23, instance=SOIL-1
 98,
*Nset, nset=SET-24, instance=SOIL-1
 99,
*Nset, nset=SET-25, instance=SOIL-1
 100,
*Nset, nset=SET-26, instance=SOIL-1
 101,
*Nset, nset=SET-27, instance=SOIL-1
 102,
*Nset, nset=SET-28, instance=SOIL-1
 103,
*Nset, nset=SET-29, instance=SOIL-1
 104,
*Nset, nset=SET-30, instance=SOIL-1
 105,
*Nset, nset=SET-31, instance=SOIL-1
 106,
*Nset, nset=SET-32, instance=SOIL-1
 107,
*Nset, nset=SET-33, instance=SOIL-1
 108,
*Nset, nset=SET-34, instance=SOIL-1
 109,
*Nset, nset=SET-35, instance=SOIL-1
 110,
*Nset, nset=SET-36, instance=SOIL-1
 111,
*Nset, nset=SET-37, instance=SOIL-1
 112,
*Nset, nset=SET-38, instance=SOIL-1
 113,
*Nset, nset=SET-39, instance=SOIL-1
 114,
*Nset, nset=SET-40, instance=SOIL-1
 115,
*Nset, nset=SET-41, instance=SOIL-1
 116,
*Nset, nset=SET-42, instance=SOIL-1
 117,
*Nset, nset=SET-43, instance=SOIL-1
 118,
*Nset, nset=SET-44, instance=SOIL-1
 119,
*Nset, nset=SET-45, instance=SOIL-1
 120,
*Nset, nset=SET-46, instance=SOIL-1
 121,
*Nset, nset=SET-47, instance=SOIL-1
 122,
*Nset, nset=SET-48, instance=SOIL-1
 123,
*Nset, nset=SET-49, instance=SOIL-1
 124,
*Nset, nset=SET-50, instance=SOIL-1
 125,
*Nset, nset=SET-51, instance=SOIL-1
 126,
*Nset, nset=SET-52, instance=SOIL-1
 127,
*Nset, nset=SET-53, instance=SOIL-1
 128,
*Nset, nset=SET-54, instance=SOIL-1
 129,
*Nset, nset=SET-55, instance=SOIL-1
 130,
*Nset, nset=SET-56, instance=SOIL-1
 131,
*Nset, nset=SET-57, instance=SOIL-1
 132,
*Nset, nset=SET-58, instance=SOIL-1
 133,
*Nset, nset=SET-59, instance=SOIL-1
 134,
*Nset, nset=SET-60, instance=SOIL-1
 135,
*Nset, nset=SET-61, instance=SOIL-1
 136,
*Nset, nset=SET-62, instance=SOIL-1
 137,
*Nset, nset=SET-63, instance=SOIL-1
 138,
*Nset, nset=SET-64, instance=SOIL-1
 139,
*Nset, nset=SET-65, instance=SOIL-1
 140,
*Nset, nset=SET-66, instance=SOIL-1
 141,
*Nset, nset=SET-67, instance=SOIL-1
 142,
*Nset, nset=SET-68, instance=SOIL-1
 143,
*Nset, nset=WIRE-2-SET-1, instance=SOIL-1
   3,  14,  85,  86,  87,  88
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*Nset, nset=M_SET-2_CNS_, internal, instance=FOOTING-1
 35,
*Nset, nset=PIER-1_SET-2_CNS_, internal, instance=PIER-1
 3,
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*Elset, elset=_PIER_SURF_SPOS, internal, instance=PIER-1
 1,
*Nset, nset=_PickedSet78, internal, instance=FOOTING-1
 35,
*Surface, type=ELEMENT, name=PIER_SURF
_PIER_SURF_SPOS, SPOS
*Surface, type=NODE, name=M_SET-2_CNS__CNS_, internal
M_SET-2_CNS_, 1.
*Surface, type=NODE, name=PIER-1_SET-2_CNS__CNS_, internal
PIER-1_SET-2_CNS_, 1.
** Constraint: CONSTRAINT-3-1-1
*Tie, name=CONSTRAINT-3-1-1, adjust=yes
PIER_SURF, M_SET-2_CNS__CNS_
** Constraint: P-RIGIDBODY-1-1-1
*Tie, name=P-RIGIDBODY-1-1-1, adjust=yes, position tolerance=10.
PIER_SURF, PIER-1_SET-2_CNS__CNS_
** Constraint: RigidBody-1
*Rigid Body, ref node=_PickedSet78, elset=FOOTING-1.FOOTING, position=CENTER OF MASS
*End Assembly
*Amplitude, name=AMP-1
             0.,              0.,           0.005,        4.57e-05,            0.01,         7.7e-05,           0.015,         8.8e-05
           0.02,        8.03e-05,           0.025,        7.27e-05,            0.03,         8.2e-05,           0.035,        0.000116
           0.04,        0.000173,           0.045,        0.000243,            0.05,        0.000308,           0.055,        0.000359
           0.06,        0.000392,           0.065,        0.000408,            0.07,        0.000413,           0.075,        0.000415
           0.08,        0.000425,           0.085,        0.000447,            0.09,        0.000483,           0.095,         0.00053
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            10.,          0.0614
*Amplitude, name=AMP-2
             0.,              0.,           0.005,        4.57e-05,            0.01,         7.7e-05,           0.015,         8.8e-05
           0.02,        8.03e-05,           0.025,        7.27e-05,            0.03,         8.2e-05,           0.035,        0.000116
           0.04,        0.000173,           0.045,        0.000243,            0.05,        0.000308,           0.055,        0.000359
           0.06,        0.000392,           0.065,        0.000408,            0.07,        0.000413,           0.075,        0.000415
           0.08,        0.000425,           0.085,        0.000447,            0.09,        0.000483,           0.095,         0.00053
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            10.,          0.0614
*Amplitude, name=AMP-3
             0.,              0.,           0.005,        7.04e-06,            0.01,        3.16e-05,           0.015,        6.52e-05
           0.02,        8.54e-05,           0.025,        8.55e-05,            0.03,        7.84e-05,           0.035,        8.21e-05
           0.04,        0.000108,           0.045,        0.000158,            0.05,        0.000223,           0.055,        0.000291
           0.06,        0.000347,           0.065,        0.000386,            0.07,        0.000408,           0.075,        0.000417
           0.08,        0.000421,           0.085,        0.000428,            0.09,        0.000446,           0.095,        0.000478
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            10.,          0.0615
*Amplitude, name=AMP-5
             0.,              0.,           0.005,        1.01e-06,            0.01,        7.47e-06,           0.015,        2.53e-05
           0.02,        5.26e-05,           0.025,        7.66e-05,            0.03,         8.6e-05,           0.035,         8.4e-05
           0.04,        8.54e-05,           0.045,        0.000104,            0.05,        0.000145,           0.055,        0.000205
           0.06,        0.000271,           0.065,        0.000331,            0.07,        0.000376,           0.075,        0.000405
           0.08,        0.000419,           0.085,        0.000426,            0.09,        0.000433,           0.095,        0.000448
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            10.,          0.0616
*Amplitude, name=AMP-7
             0.,              0.,           0.005,        1.39e-07,            0.01,        1.43e-06,           0.015,         6.9e-06
           0.02,        2.06e-05,           0.025,        4.28e-05,            0.03,        6.65e-05,           0.035,        8.21e-05
           0.04,        8.67e-05,           0.045,        8.89e-05,            0.05,        0.000102,           0.055,        0.000135
           0.06,        0.000187,           0.065,        0.000249,            0.07,        0.000311,           0.075,        0.000362
           0.08,        0.000398,           0.085,        0.000419,            0.09,        0.000429,           0.095,        0.000437
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            10.,          0.0617
*Amplitude, name=AMP-9
             0.,              0.,           0.005,        1.82e-08,            0.01,        2.42e-07,           0.015,        1.52e-06
           0.02,           6e-06,           0.025,        1.67e-05,            0.03,        3.47e-05,           0.035,        5.67e-05
           0.04,        7.54e-05,           0.045,        8.58e-05,            0.05,        9.12e-05,           0.055,        0.000101
           0.06,        0.000126,           0.065,         0.00017,            0.07,        0.000227,           0.075,        0.000289
           0.08,        0.000345,           0.085,        0.000388,            0.09,        0.000415,           0.095,        0.000431
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            10.,          0.0617
*Amplitude, name=AMP-11
             0.,              0.,           0.005,        2.26e-09,            0.01,        3.71e-08,           0.015,        2.89e-07
           0.02,        1.43e-06,           0.025,        5.02e-06,            0.03,        1.33e-05,           0.035,        2.79e-05
           0.04,        4.74e-05,           0.045,         6.7e-05,            0.05,        8.17e-05,           0.055,         9.1e-05
           0.06,        0.000101,           0.065,         0.00012,            0.07,        0.000155,           0.075,        0.000206
           0.08,        0.000266,           0.085,        0.000324,            0.09,        0.000373,           0.095,        0.000408
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            10.,          0.0618
*Amplitude, name=AMP-13
             0.,              0.,           0.005,        2.66e-10,            0.01,        5.19e-09,           0.015,        4.86e-08
           0.02,         2.9e-07,           0.025,        1.24e-06,            0.03,        4.05e-06,           0.035,        1.05e-05
           0.04,        2.21e-05,           0.045,        3.89e-05,            0.05,        5.79e-05,           0.055,         7.5e-05
           0.06,         8.8e-05,           0.065,        9.91e-05,            0.07,        0.000115,           0.075,        0.000143
           0.08,        0.000186,           0.085,        0.000241,            0.09,        0.000299,           0.095,        0.000353
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            10.,          0.0618
*Amplitude, name=AMP-15
             0.,              0.,           0.005,        2.94e-11,            0.01,        6.69e-10,           0.015,        7.33e-09
           0.02,        5.15e-08,           0.025,        2.61e-07,            0.03,        1.02e-06,           0.035,        3.16e-06
           0.04,        8.07e-06,           0.045,        1.72e-05,            0.05,        3.11e-05,           0.055,        4.86e-05
           0.06,        6.65e-05,           0.065,        8.22e-05,            0.07,        9.56e-05,           0.075,        0.000111
           0.08,        0.000133,           0.085,        0.000169,            0.09,        0.000217,           0.095,        0.000273
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            10.,          0.0619
*Amplitude, name=AMP-17
             0.,              0.,           0.005,        3.04e-12,            0.01,        7.92e-11,           0.015,        9.98e-10
           0.02,        8.11e-09,           0.025,        4.78e-08,            0.03,        2.17e-07,           0.035,        7.92e-07
           0.04,        2.38e-06,           0.045,        6.03e-06,            0.05,         1.3e-05,           0.055,        2.43e-05
           0.06,        3.95e-05,           0.065,        5.69e-05,            0.07,        7.41e-05,           0.075,        8.96e-05
           0.08,        0.000105,           0.085,        0.000125,            0.09,        0.000153,           0.095,        0.000194
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            10.,          0.0619
*Amplitude, name=AMP-19
             0.,              0.,           0.005,        2.93e-13,            0.01,        8.61e-12,           0.015,        1.23e-10
           0.02,        1.14e-09,           0.025,        7.66e-09,            0.03,           4e-08,           0.035,        1.68e-07
           0.04,        5.86e-07,           0.045,        1.73e-06,            0.05,        4.36e-06,           0.055,        9.55e-06
           0.06,        1.83e-05,           0.065,         3.1e-05,            0.07,         4.7e-05,           0.075,        6.43e-05
           0.08,        8.13e-05,           0.085,        9.78e-05,            0.09,        0.000116,           0.095,         0.00014
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            10.,           0.062
*Amplitude, name=AMP-21
             0.,              0.,           0.005,         2.6e-14,            0.01,        8.54e-13,           0.015,        1.37e-11
           0.02,        1.42e-10,           0.025,        1.08e-09,            0.03,         6.4e-09,           0.035,        3.06e-08
           0.04,        1.22e-07,           0.045,        4.12e-07,            0.05,         1.2e-06,           0.055,        3.04e-06
           0.06,        6.76e-06,           0.065,        1.33e-05,            0.07,        2.35e-05,           0.075,        3.72e-05
           0.08,        5.34e-05,           0.085,        7.08e-05,            0.09,        8.83e-05,           0.095,        0.000106
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            10.,          0.0621
*Amplitude, name=AMP-23
             0.,              0.,           0.005,        2.13e-15,            0.01,        7.68e-14,           0.015,        1.37e-12
           0.02,        1.59e-11,           0.025,        1.35e-10,            0.03,        8.94e-10,           0.035,        4.81e-09
           0.04,        2.16e-08,           0.045,        8.28e-08,            0.05,        2.74e-07,           0.055,        7.92e-07
           0.06,        2.02e-06,           0.065,        4.58e-06,            0.07,         9.3e-06,           0.075,         1.7e-05
           0.08,        2.81e-05,           0.085,        4.24e-05,            0.09,         5.9e-05,           0.095,        7.68e-05
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            10.,          0.0622
*Amplitude, name=AMP-25
             0.,              0.,           0.005,        1.58e-16,            0.01,        6.21e-15,           0.015,        1.22e-13
           0.02,        1.57e-12,           0.025,        1.47e-11,            0.03,        1.09e-10,           0.035,        6.53e-10
           0.04,        3.28e-09,           0.045,        1.41e-08,            0.05,        5.24e-08,           0.055,        1.71e-07
           0.06,        4.95e-07,           0.065,        1.28e-06,            0.07,        2.95e-06,           0.075,        6.16e-06
           0.08,        1.17e-05,           0.085,        2.02e-05,            0.09,        3.19e-05,           0.095,        4.66e-05
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            10.,          0.0624
*Amplitude, name=AMP-27
             0.,              0.,           0.005,        2.74e-17,            0.01,        4.76e-16,           0.015,        9.63e-15
           0.02,        1.35e-13,           0.025,         1.4e-12,            0.03,        1.14e-11,           0.035,        7.59e-11
           0.04,        4.24e-10,           0.045,        2.02e-09,            0.05,         8.4e-09,           0.055,        3.07e-08
           0.06,        9.96e-08,           0.065,        2.89e-07,            0.07,        7.55e-07,           0.075,        1.79e-06
           0.08,        3.84e-06,           0.085,        7.55e-06,            0.09,        1.36e-05,           0.095,        2.26e-05
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            10.,          0.0626
*Amplitude, name=AMP-29
             0.,              0.,           0.005,       -1.98e-17,            0.01,        2.82e-17,           0.015,        6.61e-16
           0.02,        1.02e-14,           0.025,        1.15e-13,            0.03,        1.03e-12,           0.035,        7.51e-12
           0.04,        4.62e-11,           0.045,        2.44e-10,            0.05,        1.12e-09,           0.055,        4.55e-09
           0.06,        1.65e-08,           0.065,        5.33e-08,            0.07,        1.56e-07,           0.075,        4.15e-07
           0.08,           1e-06,           0.085,        2.23e-06,            0.09,        4.55e-06,           0.095,        8.54e-06
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            10.,          0.0628
*Amplitude, name=AMP-31
             0.,              0.,           0.005,        6.89e-17,            0.01,        1.94e-17,           0.015,        3.06e-17
           0.02,        6.99e-16,           0.025,        8.06e-15,            0.03,        7.77e-14,           0.035,        6.22e-13
           0.04,        4.19e-12,           0.045,        2.43e-11,            0.05,        1.23e-10,           0.055,        5.53e-10
           0.06,        2.21e-09,           0.065,        7.95e-09,            0.07,        2.59e-08,           0.075,        7.66e-08
           0.08,        2.08e-07,           0.085,        5.16e-07,            0.09,        1.18e-06,           0.095,         2.5e-06
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            10.,           0.063
*Amplitude, name=AMP-33
             0.,              0.,           0.005,       -5.03e-17,            0.01,       -2.63e-20,           0.015,        1.22e-17
           0.02,       -6.56e-19,           0.025,        4.91e-16,            0.03,        4.92e-15,           0.035,        4.21e-14
           0.04,         3.1e-13,           0.045,        1.97e-12,            0.05,        1.09e-11,           0.055,        5.38e-11
           0.06,        2.37e-10,           0.065,         9.4e-10,            0.07,        3.38e-09,           0.075,        1.11e-08
           0.08,        3.35e-08,           0.085,        9.27e-08,            0.09,        2.37e-07,           0.095,        5.62e-07
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            10.,          0.0633
*Amplitude, name=AMP-35
             0.,              0.,           0.005,        1.04e-17,            0.01,        1.29e-17,           0.015,       -3.96e-17
           0.02,       -1.26e-16,           0.025,       -5.11e-17,            0.03,        3.17e-16,           0.035,        2.43e-15
           0.04,        1.82e-14,           0.045,        1.25e-13,            0.05,        7.58e-13,           0.055,        4.08e-12
           0.06,        1.97e-11,           0.065,        8.59e-11,            0.07,         3.4e-10,           0.075,        1.23e-09
           0.08,        4.11e-09,           0.085,        1.26e-08,            0.09,        3.58e-08,           0.095,        9.46e-08
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            10.,          0.0636
*Amplitude, name=AMP-37
             0.,              0.,           0.005,        1.73e-17,            0.01,        4.72e-17,           0.015,        8.45e-17
           0.02,        1.05e-16,           0.025,        1.16e-16,            0.03,         1.3e-16,           0.035,        1.93e-16
           0.04,        8.99e-16,           0.045,        6.02e-15,            0.05,        3.92e-14,           0.055,         2.3e-13
           0.06,        1.21e-12,           0.065,        5.79e-12,            0.07,        2.52e-11,           0.075,           1e-10
           0.08,        3.67e-10,           0.085,        1.25e-09,            0.09,        3.92e-09,           0.095,        1.15e-08
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            10.,          0.0639
*Amplitude, name=AMP-39
             0.,              0.,           0.005,        1.72e-17,            0.01,        4.04e-17,           0.015,        9.91e-17
           0.02,        1.86e-16,           0.025,        2.42e-16,            0.03,         1.7e-16,           0.035,        1.11e-16
           0.04,        1.51e-16,           0.045,        3.21e-16,            0.05,        1.51e-15,           0.055,        9.02e-15
           0.06,        5.13e-14,           0.065,        2.67e-13,            0.07,        1.27e-12,           0.075,        5.55e-12
           0.08,        2.23e-11,           0.085,        8.33e-11,            0.09,        2.89e-10,           0.095,        9.33e-10
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            10.,          0.0641
*Amplitude, name=AMP-41
             0.,              0.,           0.005,        1.13e-16,            0.01,        1.21e-16,           0.015,       -4.24e-18
           0.02,        -6.5e-17,           0.025,       -1.54e-17,            0.03,        7.99e-17,           0.035,        2.34e-16
           0.04,        3.05e-16,           0.045,        2.47e-16,            0.05,        1.77e-16,           0.055,        2.95e-16
           0.06,        1.33e-15,           0.065,        7.38e-15,            0.07,        3.85e-14,           0.075,        1.83e-13
           0.08,        8.09e-13,           0.085,        3.31e-12,            0.09,        1.26e-11,           0.095,        4.51e-11
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            10.,          0.0644
*Amplitude, name=AMP-43
             0.,              0.,           0.005,       -7.03e-17,            0.01,       -1.03e-16,           0.015,       -1.01e-16
           0.02,       -6.62e-17,           0.025,        2.67e-18,            0.03,        1.24e-16,           0.035,        2.17e-16
           0.04,        2.26e-16,           0.045,        2.33e-16,            0.05,        2.04e-16,           0.055,        1.91e-16
           0.06,        2.13e-16,           0.065,        3.07e-16,            0.07,        7.83e-16,           0.075,        2.97e-15
           0.08,        1.32e-14,           0.085,        5.87e-14,            0.09,        2.46e-13,           0.095,        9.66e-13
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            10.,          0.0643
*Amplitude, name=AMP-45
             0.,              0.,           0.005,       -9.95e-19,            0.01,       -1.08e-19,           0.015,        1.96e-17
           0.02,        2.25e-17,           0.025,        2.62e-17,            0.03,        4.43e-17,           0.035,         9.7e-17
           0.04,        1.68e-16,           0.045,        1.52e-16,            0.05,        1.41e-16,           0.055,        1.48e-16
           0.06,        1.87e-16,           0.065,        2.72e-16,            0.07,        2.88e-16,           0.075,        2.98e-16
           0.08,        3.66e-16,           0.085,        7.66e-16,            0.09,        2.59e-15,           0.095,        1.03e-14
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            10.,          0.0637
*Amplitude, name=AMP-47
             0.,              0.,           0.005,        3.39e-17,            0.01,        6.06e-17,           0.015,        8.83e-17
           0.02,        1.18e-16,           0.025,        1.14e-16,            0.03,        8.18e-17,           0.035,        3.06e-17
           0.04,       -2.49e-17,           0.045,       -2.19e-18,            0.05,        5.07e-17,           0.055,        8.41e-17
           0.06,           1e-16,           0.065,         6.4e-17,            0.07,        3.06e-17,           0.075,        4.55e-17
           0.08,        7.66e-17,           0.085,        1.17e-16,            0.09,        1.81e-16,           0.095,        2.84e-16
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            10.,           0.063
*Amplitude, name=AMP-49
             0.,              0.,           0.005,         6.4e-20,            0.01,        8.68e-20,           0.015,        8.92e-20
           0.02,        9.62e-20,           0.025,       -7.55e-18,            0.03,       -1.48e-17,           0.035,       -2.42e-17
           0.04,        -1.1e-17,           0.045,        1.14e-17,            0.05,       -2.27e-17,           0.055,        -4.7e-17
           0.06,       -1.04e-17,           0.065,        1.93e-18,            0.07,       -1.69e-18,           0.075,        1.86e-17
           0.08,        6.21e-17,           0.085,        1.31e-16,            0.09,        1.65e-16,           0.095,        1.51e-16
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            10.,          0.0619
*Amplitude, name=AMP-51
             0.,              0.,           0.005,       -8.94e-18,            0.01,       -2.68e-17,           0.015,       -5.35e-17
           0.02,       -8.03e-17,           0.025,       -1.07e-16,            0.03,       -1.19e-16,           0.035,       -1.04e-16
           0.04,       -7.19e-17,           0.045,       -3.93e-17,            0.05,       -2.86e-18,           0.055,        1.79e-17
           0.06,        1.34e-17,           0.065,       -1.37e-17,            0.07,       -2.52e-17,           0.075,        2.85e-17
           0.08,        1.08e-16,           0.085,        1.59e-16,            0.09,        1.56e-16,           0.095,        1.54e-16
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            10.,          0.0605
*Amplitude, name=AMP-53
             0.,              0.,           0.005,       -7.36e-18,            0.01,       -2.03e-17,           0.015,       -1.68e-17
           0.02,       -8.82e-18,           0.025,       -1.02e-17,            0.03,        5.34e-18,           0.035,        1.34e-17
           0.04,        2.19e-17,           0.045,         2.5e-17,            0.05,       -1.69e-18,           0.055,       -6.32e-17
           0.06,       -1.23e-16,           0.065,       -1.46e-16,            0.07,       -1.28e-16,           0.075,       -7.11e-17
           0.08,       -2.29e-17,           0.085,        1.64e-17,            0.09,        7.04e-17,           0.095,        1.02e-16
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            10.,          0.0594
*Amplitude, name=AMP-55
             0.,              0.,           0.005,        1.34e-18,            0.01,        6.03e-18,           0.015,        1.39e-17
           0.02,        3.06e-17,           0.025,        4.77e-17,            0.03,        4.32e-17,           0.035,        2.72e-17
           0.04,        1.16e-17,           0.045,       -6.19e-18,            0.05,       -2.38e-17,           0.055,       -4.24e-17
           0.06,       -6.22e-17,           0.065,       -4.73e-17,            0.07,       -2.37e-17,           0.075,       -1.56e-17
           0.08,       -7.07e-18,           0.085,       -2.55e-18,            0.09,       -9.31e-18,           0.095,       -4.13e-17
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            10.,          0.0588
*Amplitude, name=AMP-57
             0.,              0.,           0.005,        4.23e-18,            0.01,        1.73e-17,           0.015,        3.47e-17
           0.02,        3.89e-17,           0.025,        2.84e-17,            0.03,        8.79e-19,           0.035,       -1.74e-17
           0.04,       -1.85e-17,           0.045,       -1.66e-17,            0.05,       -1.66e-18,           0.055,        2.58e-17
           0.06,        3.95e-17,           0.065,        3.83e-17,            0.07,        3.34e-17,           0.075,         1.6e-17
           0.08,       -9.57e-18,           0.085,        -2.6e-17,            0.09,       -2.77e-17,           0.095,       -2.74e-17
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            10.,          0.0582
*Amplitude, name=AMP-59
             0.,              0.,           0.005,       -3.34e-18,            0.01,       -4.55e-18,           0.015,       -6.93e-18
           0.02,       -7.96e-18,           0.025,       -8.58e-18,            0.03,       -7.93e-18,           0.035,        1.86e-19
           0.04,        1.44e-17,           0.045,        2.18e-17,            0.05,        1.85e-17,           0.055,        1.44e-17
           0.06,        1.13e-17,           0.065,        6.09e-18,            0.07,        4.86e-18,           0.075,        1.01e-17
           0.08,        1.56e-17,           0.085,        2.01e-17,            0.09,        2.46e-17,           0.095,        2.68e-17
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            10.,          0.0578
*Amplitude, name=EQ
             0.,          0.0072,           0.005,          0.0062,            0.01,          0.0046,           0.015,          0.0028
           0.02,         -0.0002,           0.025,         -0.0016,            0.03,         -0.0002,           0.035,          0.0024
           0.04,          0.0056,           0.045,           0.008,            0.05,          0.0084,           0.055,           0.007
           0.06,           0.005,           0.065,          0.0028,            0.07,           0.001,           0.075,          0.0002
           0.08,          0.0004,           0.085,          0.0018,            0.09,          0.0034,           0.095,          0.0052
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            10.,          0.0176
**
** MATERIALS
**
*Material, name=FOOTING
*Density
2.,
*Elastic
 1e+07, 0.3
*Material, name=PIER
*Density
2.,
*Elastic
 1e+07, 0.3
*Material, name=SOIL
*Damping, beta=0.00173
*Density
 1.8,
*Depvar
      2,
*Elastic, dependencies=2
  7080.,   0.48, ,     0.,     0.
  7080.,   0.48, ,     0.,  7080.
 10040.,   0.48, ,     0., 10040.
 13000.,   0.48, ,     0., 13000.
 15960.,   0.48, ,     0., 15960.
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181720.,   0.48, ,     0.,181720.
*Plastic, dependencies=2, hardening=COMBINED, datatype=PARAMETERS, number backstresses=1
  0.61,  7080.,  1283., ,     0.,     0.
  0.61,  7080.,  1283., ,     0.,   3.54
  0.87, 10040.,  1283., ,     0.,   5.02
  1.13, 13000.,  1283., ,     0.,    6.5
  1.38, 15960.,  1283., ,     0.,   7.98
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 15.74,181720.,  1283., ,     0.,  90.86
*User Defined Field
**
** INTERACTION PROPERTIES
**
*Surface Interaction, name=NT_EXPO
1.,
*Friction, slip tolerance=0.001, taumax=5.
 0.9,
*Surface Behavior, pressure-overclosure=EXPONENTIAL
1e-05, 10.
**
** INTERACTIONS
**
** Interaction: NT_EXPO-1
*Contact Pair, interaction=NT_EXPO, small sliding, type=SURFACE TO SURFACE, adjust=0.001
SOIL-1.SURF-S-F, FOOTING-1.SURF-FOOTINGBOT
** ----------------------------------------------------------------
**
** STEP: Gravity
**
*Step, name=Gravity, nlgeom=NO, inc=100000
Grav
*Static
0.01, 1., 1e-05, 0.01
**
** BOUNDARY CONDITIONS
**
** Name: Disp-BC-1 Type: Displacement/Rotation
*Boundary
SOIL-1.SOIL_BOTNODES, 1, 1
** Name: Disp-BC-2 Type: Displacement/Rotation
*Boundary
SOIL-1.SOIL_BOTNODES, 2, 2
** Name: Disp-BC-3 Type: Displacement/Rotation
*Boundary
SOIL-1.SOIL_BOTNODES, 6, 6
** Name: Disp-BC-4 Type: Displacement/Rotation
*Boundary
SET-5, 1, 1
**
** LOADS
**
** Name: GRAVITY-1   Type: Gravity
*Dload
SOIL-1.SET-1, GRAV, 9.81, 0., -1.
**
** INTERACTIONS
**
** Interaction: NT_EXPO-1
*Model Change, type=CONTACT PAIR, remove
SOIL-1.SURF-S-F, FOOTING-1.SURF-FOOTINGBOT
**
** OUTPUT REQUESTS
**
*Restart, write, frequency=0
**
** FIELD OUTPUT: F-Output-1
**
*Output, field, variable=PRESELECT
**
** HISTORY OUTPUT: H-Output-1
**
*Output, history, variable=PRESELECT
*End Step
** ----------------------------------------------------------------
**
** STEP: Self_weight
**
*Step, name=Self_weight, nlgeom=NO, inc=100000
Self_weight
*Static
0.01, 1., 1e-05, 0.01
**
** LOADS
**
** Name: CFORCE-1   Type: Concentrated force
*Cload
SET-5, 2, -50.
** Name: GRAVITY-1   Type: Gravity
*Dload, op=NEW
**
** INTERACTIONS
**
** Interaction: NT_EXPO-1
*Model Change, type=CONTACT PAIR, add
SOIL-1.SURF-S-F, FOOTING-1.SURF-FOOTINGBOT
**
** OUTPUT REQUESTS
**
*Restart, write, frequency=0
**
** FIELD OUTPUT: F-Output-2
**
*Output, field, variable=PRESELECT
**
** HISTORY OUTPUT: H-Output-2
**
*Output, history, variable=PRESELECT
*End Step
** ----------------------------------------------------------------
**
** STEP: Dynamic
**
*Step, name=Dynamic, nlgeom=NO, inc=1000000
Apply equivalent forces
*Dynamic,alpha=0.
0.001,10.,0.0001
**
** BOUNDARY CONDITIONS
**
** Name: Disp-BC-1 Type: Displacement/Rotation
*Boundary, op=NEW
** Name: Disp-BC-2 Type: Displacement/Rotation
*Boundary, op=NEW
** Name: Disp-BC-3 Type: Displacement/Rotation
*Boundary, op=NEW
** Name: Disp-BC-4 Type: Displacement/Rotation
*Boundary, op=NEW
** Name: Disp-BC-5 Type: Displacement/Rotation
*Boundary, op=NEW, amplitude=AMP-1
SET-10, 1, 1
** Name: Disp-BC-6 Type: Displacement/Rotation
*Boundary, op=NEW, amplitude=AMP-2
SET-11, 1, 1
** Name: Disp-BC-7 Type: Displacement/Rotation
*Boundary, op=NEW, amplitude=AMP-3
SET-12, 1, 1
** Name: Disp-BC-8 Type: Displacement/Rotation
*Boundary, op=NEW, amplitude=AMP-3
SET-13, 1, 1
** Name: Disp-BC-9 Type: Displacement/Rotation
*Boundary, op=NEW, amplitude=AMP-5
SET-14, 1, 1
** Name: Disp-BC-10 Type: Displacement/Rotation
*Boundary, op=NEW, amplitude=AMP-5
SET-15, 1, 1
** Name: Disp-BC-11 Type: Displacement/Rotation
*Boundary, op=NEW, amplitude=AMP-7
SET-17, 1, 1
** Name: Disp-BC-12 Type: Displacement/Rotation
*Boundary, op=NEW, amplitude=AMP-9
SET-18, 1, 1
** Name: Disp-BC-13 Type: Displacement/Rotation
*Boundary, op=NEW, amplitude=AMP-9
SET-19, 1, 1
** Name: Disp-BC-14 Type: Displacement/Rotation
*Boundary, op=NEW, amplitude=AMP-11
SET-20, 1, 1
** Name: Disp-BC-15 Type: Displacement/Rotation
*Boundary, op=NEW, amplitude=AMP-11
SET-21, 1, 1
** Name: Disp-BC-16 Type: Displacement/Rotation
*Boundary, op=NEW, amplitude=AMP-13
SET-22, 1, 1
** Name: Disp-BC-17 Type: Displacement/Rotation
*Boundary, op=NEW, amplitude=AMP-13
SET-23, 1, 1
** Name: Disp-BC-18 Type: Displacement/Rotation
*Boundary, op=NEW, amplitude=AMP-15
SET-24, 1, 1
** Name: Disp-BC-19 Type: Displacement/Rotation
*Boundary, op=NEW, amplitude=AMP-15
SET-25, 1, 1
** Name: Disp-BC-20 Type: Displacement/Rotation
*Boundary, op=NEW, amplitude=AMP-17
SET-26, 1, 1
** Name: Disp-BC-21 Type: Displacement/Rotation
*Boundary, op=NEW, amplitude=AMP-17
SET-27, 1, 1
** Name: Disp-BC-22 Type: Displacement/Rotation
*Boundary, op=NEW, amplitude=AMP-19
SET-28, 1, 1
** Name: Disp-BC-23 Type: Displacement/Rotation
*Boundary, op=NEW, amplitude=AMP-19
SET-29, 1, 1
** Name: Disp-BC-24 Type: Displacement/Rotation
*Boundary, op=NEW, amplitude=AMP-21
SET-30, 1, 1
** Name: Disp-BC-25 Type: Displacement/Rotation
*Boundary, op=NEW, amplitude=AMP-21
SET-31, 1, 1
** Name: Disp-BC-26 Type: Displacement/Rotation
*Boundary, op=NEW, amplitude=AMP-23
SET-32, 1, 1
** Name: Disp-BC-27 Type: Displacement/Rotation
*Boundary, op=NEW, amplitude=AMP-23
SET-33, 1, 1
** Name: Disp-BC-28 Type: Displacement/Rotation
*Boundary, op=NEW, amplitude=AMP-25
SET-34, 1, 1
** Name: Disp-BC-29 Type: Displacement/Rotation
*Boundary, op=NEW, amplitude=AMP-25
SET-35, 1, 1
** Name: Disp-BC-30 Type: Displacement/Rotation
*Boundary, op=NEW, amplitude=AMP-27
SET-36, 1, 1
** Name: Disp-BC-31 Type: Displacement/Rotation
*Boundary, op=NEW, amplitude=AMP-27
SET-37, 1, 1, 25.
** Name: Disp-BC-32 Type: Displacement/Rotation
*Boundary, op=NEW, amplitude=AMP-29
SET-38, 1, 1
** Name: Disp-BC-33 Type: Displacement/Rotation
*Boundary, op=NEW, amplitude=AMP-29
SET-39, 1, 1
** Name: Disp-BC-34 Type: Displacement/Rotation
*Boundary, op=NEW, amplitude=AMP-31
SET-40, 1, 1
** Name: Disp-BC-35 Type: Displacement/Rotation
*Boundary, op=NEW, amplitude=AMP-31
SET-41, 1, 1
** Name: Disp-BC-36 Type: Displacement/Rotation
*Boundary, op=NEW, amplitude=AMP-33
SET-42, 1, 1
** Name: Disp-BC-37 Type: Displacement/Rotation
*Boundary, op=NEW, amplitude=AMP-33
SET-43, 1, 1
** Name: Disp-BC-38 Type: Displacement/Rotation
*Boundary, op=NEW, amplitude=AMP-35
SET-44, 1, 1
** Name: Disp-BC-39 Type: Displacement/Rotation
*Boundary, op=NEW, amplitude=AMP-35
SET-45, 1, 1
** Name: Disp-BC-40 Type: Displacement/Rotation
*Boundary, op=NEW, amplitude=AMP-37
SET-46, 1, 1
** Name: Disp-BC-41 Type: Displacement/Rotation
*Boundary, op=NEW, amplitude=AMP-37
SET-47, 1, 1
** Name: Disp-BC-42 Type: Displacement/Rotation
*Boundary, op=NEW, amplitude=AMP-39
SET-48, 1, 1
** Name: Disp-BC-43 Type: Displacement/Rotation
*Boundary, op=NEW, amplitude=AMP-39
SET-49, 1, 1
** Name: Disp-BC-44 Type: Displacement/Rotation
*Boundary, op=NEW, amplitude=AMP-41
SET-50, 1, 1
** Name: Disp-BC-45 Type: Displacement/Rotation
*Boundary, op=NEW, amplitude=AMP-41
SET-51, 1, 1
** Name: Disp-BC-46 Type: Displacement/Rotation
*Boundary, op=NEW, amplitude=AMP-43
SET-52, 1, 1
** Name: Disp-BC-47 Type: Displacement/Rotation
*Boundary, op=NEW, amplitude=AMP-43
SET-53, 1, 1
** Name: Disp-BC-48 Type: Displacement/Rotation
*Boundary, op=NEW, amplitude=AMP-45
SET-54, 1, 1
** Name: Disp-BC-49 Type: Displacement/Rotation
*Boundary, op=NEW, amplitude=AMP-45
SET-55, 1, 1
** Name: Disp-BC-50 Type: Displacement/Rotation
*Boundary, op=NEW, amplitude=AMP-47
SET-56, 1, 1
** Name: Disp-BC-51 Type: Displacement/Rotation
*Boundary, op=NEW, amplitude=AMP-47
SET-57, 1, 1
** Name: Disp-BC-52 Type: Displacement/Rotation
*Boundary, op=NEW, amplitude=AMP-49
SET-58, 1, 1
** Name: Disp-BC-53 Type: Displacement/Rotation
*Boundary, op=NEW, amplitude=AMP-49
SET-59, 1, 1
** Name: Disp-BC-54 Type: Displacement/Rotation
*Boundary, op=NEW, amplitude=AMP-51
SET-60, 1, 1
** Name: Disp-BC-55 Type: Displacement/Rotation
*Boundary, op=NEW, amplitude=AMP-51
SET-61, 1, 1
** Name: Disp-BC-56 Type: Displacement/Rotation
*Boundary, op=NEW, amplitude=AMP-53
SET-62, 1, 1
** Name: Disp-BC-57 Type: Displacement/Rotation
*Boundary, op=NEW, amplitude=AMP-53
SET-63, 1, 1
** Name: Disp-BC-58 Type: Displacement/Rotation
*Boundary, op=NEW, amplitude=AMP-55
SET-64, 1, 1
** Name: Disp-BC-59 Type: Displacement/Rotation
*Boundary, op=NEW, amplitude=AMP-55
SET-65, 1, 1
** Name: Disp-BC-60 Type: Displacement/Rotation
*Boundary, op=NEW, amplitude=AMP-57
SET-66, 1, 1
** Name: Disp-BC-61 Type: Displacement/Rotation
*Boundary, op=NEW, amplitude=AMP-57
SET-67, 1, 1
** Name: Disp-BC-62 Type: Displacement/Rotation
*Boundary, op=NEW, amplitude=AMP-59
SET-68, 1, 1
** Name: Disp-BC-63 Type: Displacement/Rotation
*Boundary, op=NEW
SOIL-1.SOIL_BOTNODES, 2, 2
** Name: Disp-BC-64 Type: Displacement/Rotation
*Boundary, op=NEW
SET-5, 1, 1
**
** OUTPUT REQUESTS
**
*Restart, write, frequency=0
**
** FIELD OUTPUT: F-Output-3
**
*Output, field, variable=PRESELECT, frequency=1
**
** HISTORY OUTPUT: H-Output-3
**
*Output, history, variable=PRESELECT, frequency=1
*End Step
