*Heading
** Job name: Model_v9_NT Model name: Model_v09_NTexpo
** Generated by: Abaqus/CAE 6.14-1
*Preprint, echo=NO, model=NO, history=NO, contact=NO
**
** PARTS
**
*Part, name=FOOTING
*Node
      1,           5.,        15.75
      2,         5.25,        15.75
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*Element, type=CPE4R
 1,  1,  2, 19, 18
 2,  2,  3, 20, 19
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*Nset, nset=FOOTING, generate
  1,  34,   1
*Elset, elset=FOOTING, generate
  1,  16,   1
*Nset, nset=F-CORNERRIGHT
 17,
*Nset, nset=F_CENTREOFMASS
 26,
*Nset, nset=F_CORNER_LEFT
 1,
*Elset, elset=_SURF-F-S_S1, internal, generate
  1,  16,   1
*Surface, type=ELEMENT, name=SURF-F-S
_SURF-F-S_S1, S1
** Section: Section-1-FOOTING
*Solid Section, elset=FOOTING, material=SOIL
,
*End Part
**
*Part, name=SOIL
*Node
      1,          35.,          -5.
      2,          35.,          25.
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*Element, type=CPE4R
   1,    1,   13,  677,  188
   2,   13,   14,  678,  677
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*Nset, nset=SOIL, generate
    1,  9821,     1
*Elset, elset=SOIL, generate
    1,  9600,     1
*Nset, nset=SURF_SOIL-F, generate
 553,  568,    1
*Nset, nset=SOIL_BOTNODES
   1,   4,   5,   8,   9,  11
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*Nset, nset=LEFT_NODES
   3,   4, 101, 102, 103, 104
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*Nset, nset=RIGHT_NODES
   9,  10, 394, 395, 396, 397
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*Elset, elset=_SURF-S-F_S2, internal, generate
 6180,  7080,    60
*Nset, nset=UnderFns
  561,  598, 6990, 6991, 6992, 6993
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*Surface, type=ELEMENT, name=SURF-S-F
_SURF-S-F_S2, S2
** Section: Section-2-SOIL
*Solid Section, elset=SOIL, material=SOIL
,
*End Part
**
**
** ASSEMBLY
**
*Assembly, name=Assembly
**
*Instance, name=FOOTING-1, part=FOOTING
         62.,         9.25,           0.
*End Instance
**
*Instance, name=SOIL-1, part=SOIL
         14.,           0.,           0.
*End Instance
**
*Node
      1,          69.,         25.5,           0.
*MPC
BEAM, SOIL-1.394, SOIL-1.159
BEAM, SOIL-1.395, SOIL-1.158
BEAM, SOIL-1.396, SOIL-1.157
BEAM, SOIL-1.397, SOIL-1.156
BEAM, SOIL-1.398, SOIL-1.155
BEAM, SOIL-1.399, SOIL-1.154
BEAM, SOIL-1.400, SOIL-1.153
BEAM, SOIL-1.401, SOIL-1.152
BEAM, SOIL-1.402, SOIL-1.151
BEAM, SOIL-1.403, SOIL-1.150
BEAM, SOIL-1.404, SOIL-1.149
BEAM, SOIL-1.405, SOIL-1.148
BEAM, SOIL-1.406, SOIL-1.147
BEAM, SOIL-1.407, SOIL-1.146
BEAM, SOIL-1.408, SOIL-1.145
BEAM, SOIL-1.409, SOIL-1.144
BEAM, SOIL-1.410, SOIL-1.143
BEAM, SOIL-1.411, SOIL-1.142
BEAM, SOIL-1.412, SOIL-1.141
BEAM, SOIL-1.413, SOIL-1.140
BEAM, SOIL-1.414, SOIL-1.139
BEAM, SOIL-1.415, SOIL-1.138
BEAM, SOIL-1.416, SOIL-1.137
BEAM, SOIL-1.417, SOIL-1.136
BEAM, SOIL-1.418, SOIL-1.135
BEAM, SOIL-1.419, SOIL-1.134
BEAM, SOIL-1.420, SOIL-1.133
BEAM, SOIL-1.421, SOIL-1.132
BEAM, SOIL-1.422, SOIL-1.131
BEAM, SOIL-1.423, SOIL-1.130
BEAM, SOIL-1.424, SOIL-1.129
BEAM, SOIL-1.425, SOIL-1.128
BEAM, SOIL-1.426, SOIL-1.127
BEAM, SOIL-1.427, SOIL-1.126
BEAM, SOIL-1.428, SOIL-1.125
BEAM, SOIL-1.429, SOIL-1.124
BEAM, SOIL-1.430, SOIL-1.123
BEAM, SOIL-1.431, SOIL-1.122
BEAM, SOIL-1.432, SOIL-1.121
BEAM, SOIL-1.433, SOIL-1.120
BEAM, SOIL-1.434, SOIL-1.119
BEAM, SOIL-1.435, SOIL-1.118
BEAM, SOIL-1.436, SOIL-1.117
BEAM, SOIL-1.437, SOIL-1.116
BEAM, SOIL-1.438, SOIL-1.115
BEAM, SOIL-1.439, SOIL-1.114
BEAM, SOIL-1.440, SOIL-1.113
BEAM, SOIL-1.441, SOIL-1.112
BEAM, SOIL-1.442, SOIL-1.111
BEAM, SOIL-1.443, SOIL-1.110
BEAM, SOIL-1.444, SOIL-1.109
BEAM, SOIL-1.445, SOIL-1.108
BEAM, SOIL-1.446, SOIL-1.107
BEAM, SOIL-1.447, SOIL-1.106
BEAM, SOIL-1.448, SOIL-1.105
BEAM, SOIL-1.449, SOIL-1.104
BEAM, SOIL-1.450, SOIL-1.103
BEAM, SOIL-1.451, SOIL-1.102
BEAM, SOIL-1.452, SOIL-1.101
BEAM, SOIL-1.10, SOIL-1.3
*Nset, nset=Set-3
 1,
*Nset, nset=WIRE-1-SET-1, instance=SOIL-1
   3,  10, 101, 102, 103, 104
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** Constraint: Rigid_body
*Rigid Body, ref node=Set-3, elset=FOOTING-1.FOOTING, position=CENTER OF MASS
*End Assembly
*Amplitude, name=EQ
             0.,           0.006,           0.005,          0.0044,            0.01,          0.0027,           0.015,         -0.0002
           0.02,         -0.0015,           0.025,         -0.0002,            0.03,          0.0023,           0.035,          0.0054
           0.04,          0.0077,           0.045,          0.0081,            0.05,          0.0068,           0.055,          0.0048
           0.06,          0.0027,           0.065,           0.001,            0.07,          0.0002,           0.075,          0.0004
           0.08,          0.0017,           0.085,          0.0033,            0.09,           0.005,           0.095,          0.0058
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            10.,          0.0168
*Amplitude, name=Load
             0.,              0.,             0.1,             0.1,             0.3,             0.3,             0.5,             0.5
            0.7,             0.7,             0.9,             0.9,              1.,              1.
**
** MATERIALS
**
*Material, name=FOOTING
*Density
 0.5,
*Elastic
 1e+09, 0.25
*Material, name=SOIL
*Damping, beta=0.00173
*Density
 1.8,
*Depvar
      2,
*Elastic, dependencies=2
  7080.,   0.48, ,     0.,     0.
  7080.,   0.48, ,  7080.,     0.
 10040.,   0.48, , 10040.,     0.
 13000.,   0.48, , 13000.,     0.
 15960.,   0.48, , 15960.,     0.
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181720.,   0.48, ,181720.,     0.
*Plastic, dependencies=2, hardening=COMBINED, datatype=PARAMETERS, number backstresses=1
  0.61,  7080.,  1283., ,     0.,     0.
  0.61,  7080.,  1283., ,     0.,   6.13
  0.87, 10040.,  1283., ,     0.,   8.69
  1.13, 13000.,  1283., ,     0.,  11.26
  1.38, 15960.,  1283., ,     0.,  13.82
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 15.74,181720.,  1283., ,     0., 157.37
*User Defined Field
**
** INTERACTION PROPERTIES
**
*Surface Interaction, name=IntProp-1
1.,
*Friction, slip tolerance=0.001, taumax=5.
 0.7,
*Surface Behavior, pressure-overclosure=EXPONENTIAL
1e-05, 10.
*Surface Interaction, name=IntProp-2
1.,
*Surface Behavior, pressure-overclosure=HARD
**
** INTERACTIONS
**
** Interaction: Int-1
*Contact Pair, interaction=IntProp-1, small sliding, type=SURFACE TO SURFACE
SOIL-1.SURF-S-F, FOOTING-1.SURF-F-S
** ----------------------------------------------------------------
**
** STEP: Geostatic
**
*Step, name=Geostatic, nlgeom=NO
Establishing geostatic stresses
*Geostatic, utol
0.05, 1., 1e-05, 0.05
**
** BOUNDARY CONDITIONS
**
** Name: Disp-BC-1 Type: Displacement/Rotation
*Boundary
SOIL-1.SOIL_BOTNODES, 1, 1
** Name: Disp-BC-2 Type: Displacement/Rotation
*Boundary
SOIL-1.SOIL_BOTNODES, 2, 2
** Name: Footing Type: Displacement/Rotation
*Boundary
Set-3, 1, 1
**
** LOADS
**
** Name: GRAVITY-1   Type: Gravity
*Dload
SOIL-1.SOIL, GRAV, 9.81, 0., -1.
**
** OUTPUT REQUESTS
**
*Restart, write, frequency=0
**
** FIELD OUTPUT: F-Output-1
**
*Output, field
*Node Output
CF, RF, U, V
*Element Output, directions=YES
LE, S
*Contact Output
CDISP, CSTRESS
**
** HISTORY OUTPUT: H-Output-1
**
*Output, history, variable=PRESELECT
*End Step
** ----------------------------------------------------------------
**
** STEP: Self_weight
**
*Step, name=Self_weight, nlgeom=NO, inc=100000
*Static
0.005, 1., 1e-05, 0.005
**
** LOADS
**
** Name: Load-2   Type: Gravity
*Dload, amplitude=Load
FOOTING-1.FOOTING, GRAV, 9.81, 0., -1.
**
** OUTPUT REQUESTS
**
*Restart, write, frequency=0
**
** FIELD OUTPUT: F-Output-1
**
*Output, field
*Node Output
CF, RF, U, V
*Element Output, directions=YES
LE, S
*Contact Output
CDISP, CSTRESS
**
** HISTORY OUTPUT: H-Output-1
**
*Output, history, variable=PRESELECT
*End Step
** ----------------------------------------------------------------
**
** STEP: Step-3
**
*Step, name=Step-3, nlgeom=NO, inc=100000000
Dynamic
*Dynamic,alpha=0.
0.001,7.,0.001
**
** BOUNDARY CONDITIONS
**
** Name: Acc_BC Type: Acceleration/Angular acceleration
*Boundary, op=NEW, amplitude=EQ, type=ACCELERATION
SOIL-1.SOIL_BOTNODES, 1, 1, 5.
** Name: Disp-BC-1 Type: Displacement/Rotation
*Boundary, op=NEW
** Name: Disp-BC-2 Type: Displacement/Rotation
*Boundary, op=NEW
SOIL-1.SOIL_BOTNODES, 2, 2
** Name: Footing Type: Displacement/Rotation
*Boundary, op=NEW
Set-3, 1, 1
**
** LOADS
**
** Name: Load-2   Type: Gravity
*Dload, amplitude=Load
FOOTING-1.FOOTING, GRAV, 9.81, 0., -1.
**
** OUTPUT REQUESTS
**
*Restart, write, frequency=0
**
** FIELD OUTPUT: F-Output-1
**
*Output, field, frequency=1
*Node Output
CF, RF, U, V
*Element Output, directions=YES
LE, S
*Contact Output
CDISP, CSTRESS
**
** HISTORY OUTPUT: H-Output-1
**
*Output, history, variable=PRESELECT, frequency=1
*End Step
