*Heading
** Job name: test_4pieces Model name: Simple_4
** Generated by: Abaqus/CAE 6.14-1
*Preprint, echo=NO, model=NO, history=NO, contact=NO
**
** PARTS
**
*Part, name=FND
*Node
      1,          -8.,          -2.
      2,         -8.5,          -2.
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*Element, type=CPE4R
 1,  1, 22, 23,  8
 2,  2, 24, 25,  9
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*Nset, nset=FND-REFPT_, internal
 46,
*Nset, nset=CORNERS
 15, 21
*Nset, nset=MD
 11,
*Elset, elset=_BOT_F_S3, internal
  7,  8,  9, 10, 11, 12, 19, 20, 21, 22, 23, 24
*Nset, nset=BOT_NODES
 15, 16, 17, 18, 19, 20, 21, 35, 37, 39, 41, 43, 45
*Nset, nset=WHOLE_FND
  1,  2,  3,  4,  5,  6
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*Elset, elset=WHOLE_FND, generate
  1,  24,   1
*Surface, type=ELEMENT, name=BOT_F
_BOT_F_S3, S3
** Section: Foundation
*Solid Section, elset=WHOLE_FND, material=FOUNDATION
,
*End Part
**
*Part, name=Mass
*Node
      1,           0.,           1.,           0.
*Nset, nset=Mass-RefPt_, internal
1,
*Nset, nset=Mass
 1,
*Element, type=MASS, elset=Mass_Inertia-1_
1, 1
*Mass, elset=Mass_Inertia-1_
1e+06,
*End Part
**
*Part, name=PIER
*Node
      1,           0.,         -1.5
      2,           0.,         -5.5
*Element, type=B21
1, 1, 2
*Node
      3,           0.,         -3.5,           0.
*Nset, nset=PIER-RefPt_, internal
3,
*Nset, nset=PIER
 1, 2
*Elset, elset=PIER
 1,
** Section: Section-2-PIER  Profile: Profile-1
*Beam Section, elset=PIER, material=PIER, poisson = 0.33, temperature=GRADIENTS, section=RECT
1., 0.1
0.,0.,-1.
*End Part
**
*Part, name=SOIL
*Node
      1,          13.,        15.75
      2,          13.,         3.75
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*Element, type=CPE4R
   1,    1,    9, 1397, 1396
   2,    9,   10, 1399, 1397
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*Nset, nset=LEFT_LAYER
   7,   8,  96,  97,  98,  99
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*Nset, nset=RIGHT_LAYER
  3,  4, 38, 39, 40, 41
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*Nset, nset=UNDERFND_1, generate
 469,  607,   69
*Nset, nset=UNDERFND_2
 448,
*Elset, elset=_BASE_SOIL_S4, internal
 409, 433, 457, 481, 505, 529, 697, 721, 745, 769, 793, 817
*Nset, nset=BOTTOM_LAYER
    2,    3,    5,    8,   32,   33
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*Nset, nset=SOIL_WHOLE
    1,    2,    3,    4,    5,    6
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*Elset, elset=SOIL_WHOLE, generate
    1,  1056,     1
*Nset, nset=SOILunderFND
  138,  139,  140,  141,  142,  143,  144,  820,  868,  916,  964, 1012, 1060
*Surface, type=ELEMENT, name=BASE_SOIL
_BASE_SOIL_S4, S4
** Section: Section-3-SOIL_WHOLE
*Solid Section, elset=SOIL_WHOLE, material=SOIL
,
*End Part
**
**
** ASSEMBLY
**
*Assembly, name=Assembly
**
*Instance, name=FND-1, part=FND
        27.5,          29.,           0.
*End Instance
**
*Instance, name=SOIL-1, part=SOIL
          8.,        10.25,           0.
*End Instance
**
*Instance, name=PIER-1, part=PIER
         18.,         32.5,           0.
*End Instance
**
*Instance, name=Mass-1, part=Mass
         18.,          30.,           0.
*End Instance
**
*Node
      1,          18.,          27.,           0.
*MPC
PIN, SOIL-1.8, SOIL-1.3
PIN, SOIL-1.7, SOIL-1.4
PIN, SOIL-1.96, SOIL-1.60
PIN, SOIL-1.97, SOIL-1.59
PIN, SOIL-1.98, SOIL-1.58
PIN, SOIL-1.99, SOIL-1.57
PIN, SOIL-1.100, SOIL-1.56
PIN, SOIL-1.101, SOIL-1.55
PIN, SOIL-1.102, SOIL-1.54
PIN, SOIL-1.103, SOIL-1.53
PIN, SOIL-1.104, SOIL-1.52
PIN, SOIL-1.105, SOIL-1.51
PIN, SOIL-1.106, SOIL-1.50
PIN, SOIL-1.107, SOIL-1.49
PIN, SOIL-1.108, SOIL-1.48
PIN, SOIL-1.109, SOIL-1.47
PIN, SOIL-1.110, SOIL-1.46
PIN, SOIL-1.111, SOIL-1.45
PIN, SOIL-1.112, SOIL-1.44
PIN, SOIL-1.113, SOIL-1.43
PIN, SOIL-1.114, SOIL-1.42
PIN, SOIL-1.115, SOIL-1.41
PIN, SOIL-1.116, SOIL-1.40
PIN, SOIL-1.117, SOIL-1.39
PIN, SOIL-1.118, SOIL-1.38
*Nset, nset=RP_F
 1,
*Nset, nset=WIRE-1-SET-1, instance=SOIL-1
   3,   4,   7,   8,  38,  39
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*Nset, nset=m_Set-9, instance=FND-1
  1,  2,  3,  4,  5,  6,  7, 22, 24, 26, 28, 30, 32, 46
*Nset, nset=m_TopFND, instance=FND-1
  1,  2,  3,  4,  5,  6,  7, 22, 24, 26, 28, 30, 32, 46
*Nset, nset=m_TopFND, instance=PIER-1
 2,
*Nset, nset=s_Set-10, instance=PIER-1
 1, 2
*Nset, nset=s_Set-11, instance=PIER-1
 3,
*Elset, elset=_M_SURF-1_S1, internal, instance=FND-1, generate
 1,  6,  1
*Elset, elset=_M_SURF-1_S1_1, internal, instance=FND-1
  1,  2,  3,  4,  5,  6, 13, 14, 15, 16, 17, 18
*Elset, elset=_M_SURF-1_S1_2, internal, instance=FND-1
  1,  2,  3,  4,  5,  6, 13, 14, 15, 16, 17, 18
*Nset, nset=_PickedSet62, internal
 1,
*Elset, elset=_M_SURF-FNDtop_S1, internal, instance=FND-1
  1,  2,  3,  4,  5,  6, 13, 14, 15, 16, 17, 18
*Surface, type=ELEMENT, name=M_SURF-FNDtop
_M_SURF-FNDtop_S1, S1
*Elset, elset=_s_Pier_SNEG, internal, instance=PIER-1
 1,
*Surface, type=ELEMENT, name=s_Pier
_s_Pier_SNEG, SNEG
*Elset, elset=_s_Surf-3_SNEG, internal, instance=PIER-1
 1,
*Surface, type=ELEMENT, name=s_Surf-3
_s_Surf-3_SNEG, SNEG
*Elset, elset=_surf_Soil_bot_S4, internal, instance=SOIL-1
 409, 433, 457, 481, 505, 529, 697, 721, 745, 769, 793, 817
*Surface, type=ELEMENT, name=surf_Soil_bot
_surf_Soil_bot_S4, S4
*Surface, type=NODE, name=RP_F_CNS_, internal
RP_F, 1.
** Constraint: F-P
*Tie, name=F-P, adjust=yes, position tolerance=10., type=NODE TO SURFACE
s_Pier, RP_F_CNS_
** Constraint: M-F
*Coupling, constraint name=M-F, ref node=Mass-1.Mass, surface=M_SURF-FNDtop
*Distributing, weighting method=UNIFORM
** Constraint: RigidBody_Fnd
*Rigid Body, ref node=_PickedSet62, elset=FND-1.WHOLE_FND, position=CENTER OF MASS
** Constraint: S-F
*Tie, name=S-F, adjust=yes, position tolerance=10.
surf_Soil_bot, FND-1.BOT_F
*End Assembly
*Amplitude, name=EQ
             0.,          0.0124,           0.005,          0.0092,            0.01,          0.0056,           0.015,         -0.0004
           0.02,         -0.0032,           0.025,         -0.0004,            0.03,          0.0048,           0.035,          0.0112
           0.04,           0.016,           0.045,          0.0168,            0.05,           0.014,           0.055,            0.01
           0.06,          0.0056,           0.065,           0.002,            0.07,          0.0004,           0.075,          0.0008
           0.08,          0.0036,           0.085,          0.0068,            0.09,          0.0104,           0.095,           0.012
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             5.,         -0.0176
**
** MATERIALS
**
*Material, name=FOUNDATION
*Density
 2.1,
*Elastic
 2e+06, 0.3
*Plastic
2200.,0.
*Material, name=MASS
*Density
3.,
*Material, name=PIER
*Density
3.,
*Elastic
 2e+10, 0.33
*Material, name=SOIL
*Damping, beta=0.0017
*Density
 1.8,
*Depvar
      2,
*Elastic, dependencies=2
  8560.,   0.48, ,     0.,     0.
  8560.,   0.48, ,     0.,  8560.
 14480.,   0.48, ,     0., 14480.
 20400.,   0.48, ,     0., 20400.
 26320.,   0.48, ,     0., 26320.
 32240.,   0.48, ,     0., 32240.
 38160.,   0.48, ,     0., 38160.
 44080.,   0.48, ,     0., 44080.
 50000.,   0.48, ,     0., 50000.
 55920.,   0.48, ,     0., 55920.
 61840.,   0.48, ,     0., 61840.
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186160.,   0.48, ,     0.,186160.
*Plastic, dependencies=2, hardening=COMBINED, datatype=PARAMETERS, number backstresses=1
  0.74,  8560.,  1283., ,     0.,     0.
  0.74,  8560.,  1283., ,     0.,   4.28
  1.25, 14480.,  1283., ,     0.,   7.24
  1.77, 20400.,  1283., ,     0.,   10.2
  2.28, 26320.,  1283., ,     0.,  13.16
  2.79, 32240.,  1283., ,     0.,  16.12
   3.3, 38160.,  1283., ,     0.,  19.08
  3.82, 44080.,  1283., ,     0.,  22.04
  4.33, 50000.,  1283., ,     0.,    25.
  4.84, 55920.,  1283., ,     0.,  27.96
  5.36, 61840.,  1283., ,     0.,  30.92
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 16.12,186160.,  1283., ,     0.,  93.08
*User Defined Field
** ----------------------------------------------------------------
**
** STEP: Step-1
**
*Step, name=Step-1, nlgeom=NO, inc=1000000
Gravity
*Static
0.01, 1., 1e-09, 0.01
**
** BOUNDARY CONDITIONS
**
** Name: BC-3_Fnd Type: Displacement/Rotation
*Boundary
RP_F, 2, 2
RP_F, 6, 6
** Name: BC-4_mass Type: Displacement/Rotation
*Boundary
Mass-1.Mass, 2, 2
Mass-1.Mass, 6, 6
** Name: Disp-BC-1 Type: Displacement/Rotation
*Boundary
SOIL-1.BOTTOM_LAYER, 1, 1
** Name: Disp-BC-2 Type: Displacement/Rotation
*Boundary
SOIL-1.BOTTOM_LAYER, 2, 2
**
** LOADS
**
** Name: Load-at_mass   Type: Concentrated force
*Cload
Mass-1.Mass, 1, 20.
**
** OUTPUT REQUESTS
**
*Restart, write, frequency=0
**
** FIELD OUTPUT: F-Output-1
**
*Output, field, variable=PRESELECT
**
** HISTORY OUTPUT: H-Output-1
**
*Output, history, variable=PRESELECT
*End Step
